** SINGLE AUTHORIZED CURRENT-GEOMETRY PRESCRIBED-WOBBLE CONTACT AUDIT
** ROTATION PRESCRIBED; TRANSLATION FREE; MAGPYLIB LOADS REMOVED
** STRAIGHT-PIPE CONTROL; ONLY PIPE_WALL_HELPER AND FIELD CENTERLINE GEOMETRY CHANGED
** SAME ROBOT/MESH/CONTACT/REDUCED-HYDRO/dt/B/f/cone/bias/G/ramp/phase AS 3CYCLE
** PRODUCTION ROBOT-LOCAL FRAME VALIDATION; EXACTLY THREE 30 HZ CYCLES
** ROBOT_LOCAL_TANGENT; B0=10mT; cone=30deg; Bias=0; G=0; ramp=1ms
** MAGNETIC DRIVE FRAME AUDIT - SCREENING ONLY
** L2.4 D0.815 coarse rigid carrier; one 30 Hz cycle; G=0
** FIELD_MODE=LOCAL_TANGENT_CONE; cone=30.0 deg
** SCREENING ONLY - NOT AN AUTHORITATIVE DESIGN
** CASE GEO_240; global 0.10 mm C3D4 rigid mesh; fixed direct dt=1e-7 s
** FROZEN L2300 WALL-SUPPORTED SCREENING: 29141 C3D4; threshold-aware 5 um acceptance
** CAD L=2.300000 mm D=0.815000 mm; no mesh scaling or refinement
** R014 exterior mesh analytic-field probe; 10 mg; D055; gradient 6 mT; Bias40; forward
** RESTORED ROBOT: _robot_true_R014_source.inp mesh; exact 6 mg; 2.01 mm wall helper offset=0.005 mm
** HIGH-WOBBLE 6 ms PROBE: only damping 0.055 -> 0.020; all other physics unchanged
** BOUNDED MEDIUM PROBE: 6 ms; no geometry/physics change; output 2 us
** COPEN PRECHECK: physics unchanged; robot exterior-only surface output added
** ROBOT CONTACT SANITIZED: TRUE EXTERIOR FACES ONLY
** ROBOT PART TRANSPLANTED FROM UNROUNDED BASE; no stacked fillet
** donor=_robot_true_R014_source.inp
** High-end robot-only stop added; CEL remains open; band=0.8 mm, faces=23
** CAPSULE/FILLET VARIANT; rf=0.1 mm; source=CEL_CurrentCenterline_Cone15_Z110_PolarityPlus_Mu003_Damp055_AfterBendReverse_015.inp
** MATRIX VARIANT: mu003
** Z=110 mm single-variable probe; 5 Hz fixed; m_robot=1.168e-3 A*m^2; adaptive-lead=0.
** POLARITY-PLUS CLOSED-LOOP 0.03 s: +robot_axis_global end assumed N; adaptive-lead=0.
** FULL 3D LIVE-MAGNETIC FORCE/TORQUE CLOSED-LOOP: the force is projected onto the local DXF tangent; torque remains live from Magpylib; endpoint caps are retained in the wall helper; duration=0.008333 s
** FULL 3D LIVE-MAGNETIC FORCE/TORQUE CLOSED-LOOP: the force is projected onto the local DXF tangent; torque remains live from Magpylib; endpoint caps are retained in the wall helper; duration=0.006 s
** FULL 3D LIVE-MAGNETIC FORCE/TORQUE CLOSED-LOOP: the force is projected onto the local DXF tangent; torque remains live from Magpylib; endpoint caps are retained in the wall helper; duration=0.008333 s
** Terminal robot-only outlet stop added at low-s end; CEL remains open; cap_band=0.8 mm, faces=75
** FULL 3D LIVE-MAGNETIC FORCE/TORQUE CLOSED-LOOP: the force is projected onto the local DXF tangent; torque remains live from Magpylib; endpoint caps are retained in the wall helper; duration=0.008333 s
** FORWARD-ONLY DIAGNOSTIC: live Magpylib force projected onto the local DXF pipe tangent; magnetic torque is disabled; 0.010 s probe
** WALL/CEL FACTORIAL DIAGNOSTIC; only contact inclusions changed
** CEL boundary-wall probe: Pipe_SOLID retained as fixed mass but excluded from contact; helper R3D4 wall offset=0.2 mm, end caps removed=98
*Heading
** AUTHORIZED 8.333 ms WALL-ON WOBBLE-SURVIVAL PROBE: Wobble_F30_G6L45_WallOn_Free_0083_WobbleSurvival; G6/L45; f=30 Hz
** WALL-ON FREE-TRANSLATION PROBE: Wobble_F30_G6L45_WallOn_Free_0083_WobbleSurvival; spin=30 Hz; duration=8.333 ms
** WALL/CEL FACTORIAL: Wobble_F30_G6L45_WallOn_Free_0083_WobbleSurvival; Wall=ON; CEL=ON; 1.8 ms; phase=248 deg; gradient=6.000 mT=0.006000 T; spin=30 Hz
** FREE-TRANSLATION PROBE: F30; cone30; B=10 mT; Wall-ON; CEL-ON; translations fixed, rotations free
** Robot refined contact mesh, centerline translation + tangent-following orientation
** Job name: Job_RouteA_CEL_SOLID_robotfine Model name: RouteA_SolidCEL_Probe
** Generated by: Abaqus/CAE 2025
*Preprint, echo=NO, model=NO, history=NO, contact=NO
**
** PARTS
**
**
*Part, name=Pipe_WALL_HELPER
*Node
1, -19.2778697489, -2.56472286113, -11.4865091191
2, -19.3034056993, -2.7224333001, -11.4133571423
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*Element, type=R3D4
1, 1, 25, 26, 2
2, 2, 26, 27, 3
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*Elset, elset=PIPE_WALL_HELPER_ALL, generate
1, 2880, 1
*Surface, type=ELEMENT, name=PIPE_WALL_HELPER_SURF
PIPE_WALL_HELPER_ALL, SPOS
*End Part
** Robot-only terminal stop; not included in CEL material contact
*Part, name=Pipe_TERMINAL_STOP
*Node
       1, -17.8120422, -16.0254612, -1.98043847
       2, -18.0087299, -16.4204502, -1.75030053
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*Element, type=R3D4
       1, 1, 2, 3, 4
       2, 4, 3, 5, 6
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*Elset, elset=PIPE_TERMINAL_STOP_ALL, generate
1, 75, 1
*Surface, type=ELEMENT, name=PIPE_TERMINAL_STOP_SURF
PIPE_TERMINAL_STOP_ALL, SPOS
*End Part
** Robot-only HIGH terminal stop; CEL material remains open
*Part, name=Pipe_TERMINAL_STOP_HIGH
*Node
       1, 6.27608633, -5.94825697, -5.65262365
       2, 6.23722649, -5.56458235, -5.31121445
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*Element, type=R3D4
       1, 1, 2, 3, 4
       2, 4, 3, 5, 6
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*Elset, elset=PIPE_TERMINAL_STOP_HIGH_ALL, generate
1, 23, 1
*Surface, type=ELEMENT, name=PIPE_TERMINAL_STOP_HIGH_SURF
PIPE_TERMINAL_STOP_HIGH_ALL, SPOS
*End Part
*Part, name=Pipe_SOLID
*Node
      1,  -16.5284824,  -17.2844334,  -1.96806526
      2,  -18.3441372,  -16.7630806,  -2.62501884
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*Element, type=C3D4
   1,  843,  844,  845,  846
   2,  847,  671,  848,  676
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*Nset, nset=PIPE_CEL_BODY, generate
    1,  1345,     1
*Elset, elset=PIPE_CEL_BODY, generate
    1,  5203,     1
*Elset, elset=PIPE_SOLID_ALL, generate
1, 5203, 1
*Surface, type=ELEMENT, name=PIPE_SOLID_SURF
PIPE_SOLID_ALL, S1
PIPE_SOLID_ALL, S2
PIPE_SOLID_ALL, S3
PIPE_SOLID_ALL, S4
** Section: SEC_PIPE_RIGID
*Solid Section, elset=PIPE_CEL_BODY, material=MAT_PIPE_RIGID
,
*End Part
**
** SCREENING ONLY: exact STEP import; no node scaling
*Part, name=Robot_SOLID
*Node
1, -6.3161368748, -3.40833308036, -9.27631598334
2, -8.37923479519, -3.15411988934, -9.77851884272
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*Element, type=C3D4
1, 706, 707, 708, 709
2, 710, 711, 712, 713
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*Elset, elset=ROBOT_EXTERIOR_S1
30, 47, 68, 171, 237, 299
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*Elset, elset=ROBOT_EXTERIOR_S2
1146, 1523, 1627, 1654, 1800, 1842
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*Elset, elset=ROBOT_EXTERIOR_S3
134, 1142, 1323, 1539, 1625, 1741
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*Elset, elset=ROBOT_EXTERIOR_S4
501, 940, 1143, 1610, 1636, 1655
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*Nset, nset=ROBOT_CEL_BODY, generate
1, 1588, 1
*Elset, elset=ROBOT_CEL_BODY, generate
1, 7302, 1
*Elset, elset=ROBOT_SOLID_ALL, generate
1, 7302, 1
*Surface, type=ELEMENT, name=ROBOT_SOLID_SURF
ROBOT_EXTERIOR_S1, S1
ROBOT_EXTERIOR_S2, S2
ROBOT_EXTERIOR_S3, S3
ROBOT_EXTERIOR_S4, S4
*Solid Section, elset=ROBOT_CEL_BODY, material=MAT_ROBOT_RIGID
,
*End Part
**
**
** ASSEMBLY
**
*Assembly, name=Assembly
*Instance, name=Pipe_WALL_HELPER-1, part=Pipe_WALL_HELPER
*End Instance
**
*Instance, name=Pipe_TERMINAL_STOP-1, part=Pipe_TERMINAL_STOP
*End Instance
**
*Instance, name=Pipe_TERMINAL_STOP_HIGH-1, part=Pipe_TERMINAL_STOP_HIGH
*End Instance
**
*Elset, elset=PIPE_TERMINAL_STOP_CEL_ALL, instance=Pipe_TERMINAL_STOP-1, generate
1, 75, 1
*Elset, elset=PIPE_TERMINAL_STOP_HIGH_CEL_ALL, instance=Pipe_TERMINAL_STOP_HIGH-1, generate
1, 23, 1
*Elset, elset=PIPE_WALL_HELPER_CEL_ALL, instance=Pipe_WALL_HELPER-1, generate
1, 2880, 1
**
*Instance, name=Pipe_SOLID-1, part=Pipe_SOLID
*End Instance
**
*Instance, name=Robot_SOLID-1, part=Robot_SOLID
*End Instance
**
*Elset, elset=PIPE_SOLID_CEL_ALL, instance=Pipe_SOLID-1, generate
1, 5203, 1
*Elset, elset=ROBOT_SOLID_CEL_ALL, instance=Robot_SOLID-1, generate
1, 7302, 1
**
*Node
      1,  -5.80302477,  -9.99273777,  -5.95533371
*Node
      2, -7.468174204284, -3.676918015967, -9.550745259298
*Nset, nset=RP_PIPE
 1,
*Nset, nset=RP_ROBOT
 2,
*Elset, elset=PIPE_RIGID_ALL
PIPE_SOLID_CEL_ALL,
PIPE_WALL_HELPER_CEL_ALL,
PIPE_TERMINAL_STOP_CEL_ALL,
PIPE_TERMINAL_STOP_HIGH_CEL_ALL,
*Rigid Body, ref node=RP_PIPE, elset=PIPE_RIGID_ALL
** Constraint: RB_PIPE
** Constraint: RB_ROBOT
*Rigid Body, ref node=RP_ROBOT, elset=ROBOT_SOLID_CEL_ALL
*End Assembly
** Reduced-Hydro: CEL fluid part, material, initialization and CEL contact were removed.
**
** MATERIALS
**
*Material, name=MAT_PIPE_RIGID
*Density
 1e-09,
*Elastic
 1e+06, 0.3
*Material, name=MAT_ROBOT_RIGID
*Density
7.80906654321e-09,
*Elastic
 1e+06, 0.3
**
** INTERACTION PROPERTIES
**
*Surface Interaction, name=PROP_CEL_HARD
*Friction
0.03,
*Surface Behavior, pressure-overclosure=HARD
*Contact Damping, definition=CRITICAL DAMPING FRACTION, tangent fraction=0.0
0.5
**
** BOUNDARY CONDITIONS
**
** Name: BC_PIPE_FIXED Type: Symmetry/Antisymmetry/Encastre
*Boundary
RP_PIPE, ENCASTRE
** ----------------------------------------------------------------
**
** STEP: Step_Drive
**
*Contact
*Contact Inclusions
ROBOT_SOLID-1.ROBOT_SOLID_SURF, Pipe_WALL_HELPER-1.PIPE_WALL_HELPER_SURF
*Contact Property Assignment
ROBOT_SOLID-1.ROBOT_SOLID_SURF, Pipe_WALL_HELPER-1.PIPE_WALL_HELPER_SURF, PROP_CEL_HARD
** REDUCED-HYDRO BASELINE; CEL REMOVED; production external Magpylib retained.
** FREE-TRANSLATION PARAMETERS: phase=248.0 deg; cone=30 deg; Bias40; gradient=6.000 mT=0.006000 T; server-side analytic field
** SOCKET BASELINE JOB: Job_RouteA_CEL_Socket_ConnectorFixed_Capsule_0p003
** Local centerline frame at COM RP (metadata only); COM translations constrained in calibration
** COM-fixed RP_ROBOT = (-7.468174204284, -3.676918015967, -9.550745259298) mm; volume-weighted mesh COM
** tangent-X = (-0.928048296, 0.179421111, -0.326396119)
** transported-Y = (0.140416425, 0.988230515, -0.0606933022)
** binormal-Z = (0.312362773, -0.102386426, -0.944429202)
** CSF rho=1.0007e-09 tonne/mm^3; mu=7.1e-10 N*s/mm^2; c0=1480000 mm/s
*Step, name=Step_Drive, nlgeom=YES
*Dynamic, Explicit, DIRECT
1.0e-07, 0.016667
*Bulk Viscosity
0.06, 1.2
**
** BOUNDARY CONDITIONS
**
** REDUCED-HYDRO LOAD INTERFACE: magnetic Socket loads plus dissipative body-following hydro loads.
** SOCKET_* remain production Magpylib loads; HYDRO_* are local dissipative loads from RP V/VR sensors.
** DOF 1..3: Fx,Fy,Fz [N]; DOF 4..6: Mx,My,Mz [N*mm].
** Abaqus uses *CLOAD for both concentrated forces and moments;
** CFORCE/CMOMENT are output quantities, not input keywords.
** PRESCRIBED REPLAY: no magnetic Socket loads; translations remain free.
** Reduced-Hydro force and moment loads are retained.
*Amplitude, name=HYDRO_FX, definition=USER
*Amplitude, name=HYDRO_FY, definition=USER
*Amplitude, name=HYDRO_FZ, definition=USER
*Amplitude, name=HYDRO_MX, definition=USER
*Amplitude, name=HYDRO_MY, definition=USER
*Amplitude, name=HYDRO_MZ, definition=USER
*Cload, amplitude=HYDRO_FX
RP_ROBOT, 1, 1.
*Cload, amplitude=HYDRO_FY
RP_ROBOT, 2, 1.
*Cload, amplitude=HYDRO_FZ
RP_ROBOT, 3, 1.
*Cload, amplitude=HYDRO_MX
RP_ROBOT, 4, 1.
*Cload, amplitude=HYDRO_MY
RP_ROBOT, 5, 1.
*Cload, amplitude=HYDRO_MZ
RP_ROBOT, 6, 1.
*Amplitude, name=PRESCRIBED_UR1, time=TOTAL TIME
0, -0, 0.0001, -0.000274314658181, 0.0002, -0.00200601821318, 0.0003, -0.0060688350819
0.0004, -0.0126289814843, 0.0005, -0.0211716516739, 0.0006, -0.0306410110914, 0.0007, -0.0396925328319
0.0008, -0.0470561314812, 0.0009, -0.052008169185, 0.001, -0.0549500334708, 0.0011, -0.0574267621496
0.0012, -0.0598864763991, 0.0013, -0.06232826985, 0.0014, -0.0647512426124, 0.0015, -0.0671545016433
0.0016, -0.0695371611106, 0.0017, -0.0718983427556, 0.0018, -0.074237176251, 0.0019, -0.0765527995571
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0.0164, 0.00382689382674, 0.0165, 0.00638458499577, 0.0166, 0.00893624307472, 0.016667, 0.0106420415567
*Amplitude, name=PRESCRIBED_UR2, time=TOTAL TIME
0, 0, 0.0001, 0.00388764455807, 0.0002, 0.0259700141834, 0.0003, 0.072152777211
0.0004, 0.138514324696, 0.0005, 0.21505493623, 0.0006, 0.289218176811, 0.0007, 0.349161077096
0.0008, 0.386750516206, 0.0009, 0.400264145125, 0.001, 0.396775157981, 0.0011, 0.389696346752
0.0012, 0.382486127518, 0.0013, 0.375147124049, 0.0014, 0.367682009881, 0.0015, 0.360093507269
0.0016, 0.352384386122, 0.0017, 0.344557462908, 0.0018, 0.336615599544, 0.0019, 0.328561702257
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0.0164, -0.412586107577, 0.0165, -0.407381181246, 0.0166, -0.402024770665, 0.016667, -0.398352169019
*Amplitude, name=PRESCRIBED_UR3, time=TOTAL TIME
0, 0, 0.0001, 0.00309482214305, 0.0002, 0.0213868399589, 0.0003, 0.0614548248711
0.0004, 0.121996505549, 0.0005, 0.195835189482, 0.0006, 0.272277386195, 0.0007, 0.339804782757
0.0008, 0.389082790365, 0.0009, 0.416266788153, 0.001, 0.426586139064, 0.0011, 0.433177512518
0.0012, 0.439632470814, 0.0013, 0.445948618643, 0.0014, 0.452123612503, 0.0015, 0.458155161683
0.0016, 0.464041029216, 0.0017, 0.469779032817, 0.0018, 0.475367045788, 0.0019, 0.480802997906
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0.0164, -0.224570779655, 0.0165, -0.232443308308, 0.0166, -0.240214371689, 0.016667, -0.245362899756
*Boundary, type=DISPLACEMENT, amplitude=PRESCRIBED_UR1
RP_ROBOT, 4, 4, 1.
*Boundary, type=DISPLACEMENT, amplitude=PRESCRIBED_UR2
RP_ROBOT, 5, 5, 1.
*Boundary, type=DISPLACEMENT, amplitude=PRESCRIBED_UR3
RP_ROBOT, 6, 6, 1.
**
** OUTPUT REQUESTS
**
*Restart, write, number interval=1, time marks=NO
**
** FIELD OUTPUT: F-Output-1
**
** IMPACT ENERGY DIAGNOSTIC: preserve all existing physics; save visualization/contact fields every 25 us; RP and contact-resultant history remains every increment.
*Output, field, time interval=1.0e-4, time marks=NO
*Node Output
U
*Node Output, nset=RP_ROBOT
U, UR, V, VR, A, AR, CF, RF, RM
*Contact Output, general contact
CSTRESS, CFORCE
*Contact Output, surface=ROBOT_SOLID-1.ROBOT_SOLID_SURF
CDISP
*Output, history, frequency=1
*Node Output, nset=RP_ROBOT
COORD, U, UR, V, VR, A, AR, CF, RF, RM
*Contact Output, surface=ROBOT_SOLID-1.ROBOT_SOLID_SURF
CFN, CFS, CFT
*Contact Output, surface=Pipe_WALL_HELPER-1.PIPE_WALL_HELPER_SURF
CFN, CFS, CFT
*Output, history, time interval=5.0e-5
*Energy Output, variable=ALL
*Output, history, frequency=1, sensor, name=RP_U1
*Node Output, nset=RP_ROBOT
U1
*Output, history, frequency=1, sensor, name=RP_U2
*Node Output, nset=RP_ROBOT
U2
*Output, history, frequency=1, sensor, name=RP_U3
*Node Output, nset=RP_ROBOT
U3
*Output, history, frequency=1, sensor, name=RP_UR1
*Node Output, nset=RP_ROBOT
UR1
*Output, history, frequency=1, sensor, name=RP_UR2
*Node Output, nset=RP_ROBOT
UR2
*Output, history, frequency=1, sensor, name=RP_UR3
*Node Output, nset=RP_ROBOT
UR3
*Output, history, frequency=1, sensor, name=RP_V1
*Node Output, nset=RP_ROBOT
V1
*Output, history, frequency=1, sensor, name=RP_V2
*Node Output, nset=RP_ROBOT
V2
*Output, history, frequency=1, sensor, name=RP_V3
*Node Output, nset=RP_ROBOT
V3
*Output, history, frequency=1, sensor, name=RP_VR1
*Node Output, nset=RP_ROBOT
VR1
*Output, history, frequency=1, sensor, name=RP_VR2
*Node Output, nset=RP_ROBOT
VR2
*Output, history, frequency=1, sensor, name=RP_VR3
*Node Output, nset=RP_ROBOT
VR3
*End Step
