*Heading
** F100 G2P20 CEL axial boundary reflection harness
** H0: default free Eulerian axial ends; H1: documented nonreflecting axial ends
*Preprint, echo=NO, model=NO, history=NO, contact=NO
*Part, name=FLUID_EULERIAN
*Node
1, -6, -0.75, -0.75
2, -5.72727272727, -0.75, -0.75
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*Element, type=EC3D8R
1, 1, 2, 47, 46, 946, 947, 992, 991
2, 2, 3, 48, 47, 947, 948, 993, 992
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*Elset, elset=FLUID_ALL, generate
1, 17600, 1
*Elset, elset=PROBE_CENTER
21, 22, 23
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*Nset, nset=PROBE_CENTER_NODES
21, 22, 23, 24
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*Elset, elset=PROBE_LOW_QUARTER
10, 11, 12
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*Nset, nset=PROBE_LOW_QUARTER_NODES
10, 11, 12, 13
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*Elset, elset=PROBE_HIGH_QUARTER
32, 33, 34
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*Nset, nset=PROBE_HIGH_QUARTER_NODES
32, 33, 34, 35
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*Elset, elset=PROBE_LOW_END_NEAR
2, 3, 4
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*Nset, nset=PROBE_LOW_END_NEAR_NODES
2, 3, 4, 5
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*Elset, elset=PROBE_HIGH_END_NEAR
41, 42, 43
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*Nset, nset=PROBE_HIGH_END_NEAR_NODES
41, 42, 43, 44
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*Surface, type=ELEMENT, name=EUL_LOW
1, S1
45, S1
89, S1
133, S1
177, S1
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17557, S1
*Surface, type=ELEMENT, name=EUL_HIGH
44, S2
88, S2
132, S2
176, S2
220, S2
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17600, S2
*Eulerian Section, elset=FLUID_ALL
MAT_FLUID_CEL, WATER
*End Part
*Part, name=CONFINING_WALL
*Node
1, -6, -0.75, -0.75
2, -5.72727272727, -0.75, -0.75
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*Element, type=R3D4
1, 1, 2, 47, 46
2, 2, 3, 48, 47
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*Elset, elset=WALL_ALL, generate
1, 3520, 1
*Elset, elset=WALL_SIDE_1
1, 2, 3, 4, 5, 6
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*Elset, elset=WALL_SIDE_2
881, 882, 883, 884, 885, 886
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*Elset, elset=WALL_SIDE_3
1761, 1762, 1763, 1764, 1765, 1766
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*Elset, elset=WALL_SIDE_4
2641, 2642, 2643, 2644, 2645, 2646
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*Surface, type=ELEMENT, name=WALL_SURF
1, S1
2, S1
3, S1
4, S1
5, S1
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3520, S1
*End Part
*Assembly, name=Assembly
*Instance, name=Fluid_EULERIAN-1, part=FLUID_EULERIAN
*End Instance
*Instance, name=Confining_Wall-1, part=CONFINING_WALL
*End Instance
*Node
900000, 0., 0., 0.
*Nset, nset=RP_WALL
900000
*Elset, elset=WALL_ALL, instance=Confining_Wall-1, generate
1, 3520, 1
*Surface, type=EULERIAN MATERIAL, name=FLUID_SURF
Fluid_EULERIAN-1_WATER
*Rigid Body, ref node=RP_WALL, elset=WALL_ALL
*End Assembly
*Initial Conditions, type=VOLUME FRACTION
Fluid_EULERIAN-1.FLUID_ALL, Fluid_EULERIAN-1_WATER, 1.0
*Nset, nset=SRC_PLUS, instance=Fluid_EULERIAN-1
22
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*Nset, nset=SRC_MINUS, instance=Fluid_EULERIAN-1
24
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*Initial Conditions, type=VELOCITY
SRC_PLUS, 1, 10.0
SRC_MINUS, 1, -10.0
*Material, name=MAT_FLUID_CEL
*Density
1.0007e-9
*Eos, type=USUP
100000.0, 0.0, 0.0
*Viscosity
7.1e-10
*Material, name=MAT_WALL
*Density
7.8e-9
*Elastic
2.1e5, 0.3
*Surface Interaction, name=FLUID_WALL_PROP
*Surface Behavior, pressure-overclosure=HARD
*Contact
*Contact Inclusions
Confining_Wall-1.WALL_SURF, FLUID_SURF
*Contact Property Assignment
Confining_Wall-1.WALL_SURF, FLUID_SURF, FLUID_WALL_PROP
*Boundary
RP_WALL, ENCASTRE
*Step, name=Wave, nlgeom=YES
*Dynamic, Explicit
, 0.00025
*Eulerian Boundary, OUTFLOW=NONREFLECTING
Fluid_EULERIAN-1.EUL_LOW
Fluid_EULERIAN-1.EUL_HIGH
*Bulk Viscosity
0.06, 1.2
*Output, field, time interval=2.5e-6, time marks=YES
*Element Output, elset=Fluid_Eulerian-1.PROBE_CENTER
EVF, S
*Node Output, nset=Fluid_Eulerian-1.PROBE_CENTER_NODES
V
*Element Output, elset=Fluid_Eulerian-1.PROBE_LOW_QUARTER
EVF, S
*Node Output, nset=Fluid_Eulerian-1.PROBE_LOW_QUARTER_NODES
V
*Element Output, elset=Fluid_Eulerian-1.PROBE_HIGH_QUARTER
EVF, S
*Node Output, nset=Fluid_Eulerian-1.PROBE_HIGH_QUARTER_NODES
V
*Element Output, elset=Fluid_Eulerian-1.PROBE_LOW_END_NEAR
EVF, S
*Node Output, nset=Fluid_Eulerian-1.PROBE_LOW_END_NEAR_NODES
V
*Element Output, elset=Fluid_Eulerian-1.PROBE_HIGH_END_NEAR
EVF, S
*Node Output, nset=Fluid_Eulerian-1.PROBE_HIGH_END_NEAR_NODES
V
*End Step
