** RF_FRIC0: deterministic 8x8x8 subcell EVF initialization from FACEFIX20. Mesh/physics/boundaries unchanged.
** F100 G2P20 ZERO PRESSURE FREE50 candidate; only axial Eulerian end treatment changed
** REDUCED_SOUND_SPEED_COARSE_CEL_FAST_SCREEN
** ONE PHYSICS CHANGE FROM AUTHORITATIVE PARENT: A_main 14.8 -> 14.5 deg
** FULL TRANSIT s_start=-3.200000000000 s_finish=4.366533591945 travel=7.566533591945 mm
** LONG_COARSE_TRUECEL_TRANSIT; REDUCED_SOUND_SPEED_LONG_COARSE_CEL
** axial CEL ends: official ZERO PRESSURE Eulerian outflow treatment
** REDUCED_SOUND_SPEED_COARSE_CEL; qualitative visual transit only; pressure fidelity NOT FINAL
** density and viscosity real; true Eulerian-Lagrangian CEL coupling; U0=0
** TRUE-CEL TECHNICAL STABILITY GATE; QUIESCENT WATER; HARD ROBOT-WALL; AUTO DT SCALE=0.6
** magnetic physics frozen; smooth initialization ramp 0.2 ms; duration 0.5 ms
** AUTHORITATIVE TRUE-CEL SHORT TRANSFER; PRECOMPUTED_TABLE; NO SOCKET; NO SURROGATE HYDRO
** f=120Hz; B0=10mT; G=1.184mT; A_main=14.8deg; A_cross=2.5deg; duration=3ms
** AUTHORITATIVE CASE: TRUECEL_B0P11_G2P20_A14P5_F100_CLEAN50
** SOLE PHYSICS CHANGE: MAGNETIC GRADIENT G=0.15 -> 1.184 mT
** NON-CEL FAST_SURROGATE_FLUID; PRECOMPUTED_TABLE; FIVE 120 HZ CYCLES
** HEAD FORWARD/RIGHT; TAIL REAR/LEFT; CANONICAL +s LEFT TO RIGHT
** INHERITED PROVENANCE COMMENTS BELOW ARE NON-AUTHORITATIVE
** F60 G0.15 STRICT TRUE-CEL DYNAMIC SCREEN
** TRUECEL_B0P11_G2P20_A14P5_F100_CLEAN50; f=120Hz; A_main=14.8deg; A_cross=2.5deg; G=0.15mT; L=45mm; duration=0.008333333333s
** TRUE RIGID 180deg MESH FLIP ABOUT n_routeA; COM/TUBE/CONTACT/HYDRO COEFFICIENTS FROZEN
** STRICT_CEL_FLUID_PRESENT; ROBOT_LOCAL_ELLIPTIC_ROCKING; FIXED ROUTEA GAUGE; AUTOMATIC EXPLICIT DT
** INITIALIZED_UNIFORM_FLOW_TRUE_CEL; actual Eulerian fluid U0=+10mm/s along canonical +s
** FAST STRAIGHT DYNAMIC SCREEN
** S4_HEADFORWARD_F60_G0P10_FLOW; mode=ROBOT_LOCAL_ELLIPTIC_ROCKING; f=60Hz; A_main=14.3431117114381deg; A_cross=2.5deg; G=0.10mT; L=45mm; duration=0.037500000s
** NON-CEL; SAME RIGID ROBOT/TUBE, ONE-WALL GENERAL CONTACT, MU=0.03, ZETA=0.50, REDUCEDHYDRO, INITIAL POSE, ROUTEA GAUGE, DT=2E-7
** ROUTEA HEAD-TAIL MAGNETIC ROCKING EXISTENCE PROOF
** ROBOT_LOCAL_ROCKING; B0=10mT; alpha_B0=10deg; f=5Hz; phase=0; G=0
** CLEAN INITIAL POSE: robot HEAD-to-TAIL axis aligned with straight local tangent
** ROBOT SHAPE/RIGIDITY, ONE-WALL GENERAL CONTACT, mu=0.03, zeta=0.50, dt=2e-7, AND REDUCED HYDRO UNCHANGED EXCEPT V_REL FLOW
** STRAIGHT-PIPE CONTROL; ONLY PIPE_WALL_HELPER AND FIELD CENTERLINE GEOMETRY CHANGED
** SAME ROBOT/MESH/CONTACT/REDUCED-HYDRO/dt/B/f/cone/bias/G/ramp/phase AS 3CYCLE
** PRODUCTION ROBOT-LOCAL FRAME VALIDATION; EXACTLY THREE 30 HZ CYCLES
** ROBOT_LOCAL_TANGENT; B0=10mT; cone=30deg; Bias=0; G=0; ramp=1ms
** MAGNETIC DRIVE FRAME AUDIT - SCREENING ONLY
** L2.4 D0.815 coarse rigid carrier; one 30 Hz cycle; G=0
** FIELD_MODE=LOCAL_TANGENT_CONE; cone=30.0 deg
** SCREENING ONLY - NOT AN AUTHORITATIVE DESIGN
** CASE GEO_240; global 0.10 mm C3D4 rigid mesh; fixed direct dt=1e-7 s
** FROZEN L2300 WALL-SUPPORTED SCREENING: 29141 C3D4; threshold-aware 5 um acceptance
** CAD L=2.300000 mm D=0.815000 mm; no mesh scaling or refinement
** R014 exterior mesh analytic-field probe; 10 mg; D055; gradient 6 mT; Bias40; forward
** RESTORED ROBOT: _robot_true_R014_source.inp mesh; exact 6 mg; 2.01 mm wall helper offset=0.005 mm
** HIGH-WOBBLE 6 ms PROBE: only damping 0.055 -> 0.020; all other physics unchanged
** BOUNDED MEDIUM PROBE: 6 ms; no geometry/physics change; output 2 us
** COPEN PRECHECK: physics unchanged; robot exterior-only surface output added
** ROBOT CONTACT SANITIZED: TRUE EXTERIOR FACES ONLY
** ROBOT PART TRANSPLANTED FROM UNROUNDED BASE; no stacked fillet
** donor=_robot_true_R014_source.inp
** High-end robot-only stop added; CEL remains open; band=0.8 mm, faces=23
** CAPSULE/FILLET VARIANT; rf=0.1 mm; source=CEL_CurrentCenterline_Cone15_Z110_PolarityPlus_Mu003_Damp055_AfterBendReverse_015.inp
** MATRIX VARIANT: mu003
** Z=110 mm single-variable probe; 5 Hz fixed; m_robot=1.168e-3 A*m^2; adaptive-lead=0.
** POLARITY-PLUS CLOSED-LOOP 0.03 s: +robot_axis_global end assumed N; adaptive-lead=0.
** FULL 3D LIVE-MAGNETIC FORCE/TORQUE CLOSED-LOOP: the force is projected onto the local DXF tangent; torque remains live from Magpylib; endpoint caps are retained in the wall helper; duration=0.008333 s
** FULL 3D LIVE-MAGNETIC FORCE/TORQUE CLOSED-LOOP: the force is projected onto the local DXF tangent; torque remains live from Magpylib; endpoint caps are retained in the wall helper; duration=0.006 s
** FULL 3D LIVE-MAGNETIC FORCE/TORQUE CLOSED-LOOP: the force is projected onto the local DXF tangent; torque remains live from Magpylib; endpoint caps are retained in the wall helper; duration=0.008333 s
** Terminal robot-only outlet stop added at low-s end; CEL remains open; cap_band=0.8 mm, faces=75
** FULL 3D LIVE-MAGNETIC FORCE/TORQUE CLOSED-LOOP: the force is projected onto the local DXF tangent; torque remains live from Magpylib; endpoint caps are retained in the wall helper; duration=0.008333 s
** FORWARD-ONLY DIAGNOSTIC: live Magpylib force projected onto the local DXF pipe tangent; magnetic torque is disabled; 0.010 s probe
** WALL/CEL FACTORIAL DIAGNOSTIC; only contact inclusions changed
** CEL boundary-wall probe: Pipe_SOLID retained as fixed mass but excluded from contact; helper R3D4 wall offset=0.2 mm, end caps removed=98
*Heading
** AUTHORIZED 8.333 ms WALL-ON WOBBLE-SURVIVAL PROBE: Wobble_F30_G6L45_WallOn_Free_0083_WobbleSurvival; G6/L45; f=30 Hz
** WALL-ON FREE-TRANSLATION PROBE: Wobble_F30_G6L45_WallOn_Free_0083_WobbleSurvival; spin=30 Hz; duration=8.333 ms
** WALL/CEL FACTORIAL: Wobble_F30_G6L45_WallOn_Free_0083_WobbleSurvival; Wall=ON; CEL=ON; 1.8 ms; phase=248 deg; gradient=6.000 mT=0.006000 T; spin=30 Hz
** FREE-TRANSLATION PROBE: F30; cone30; B=10 mT; Wall-ON; CEL-ON; translations fixed, rotations free
** Robot refined contact mesh, centerline translation + tangent-following orientation
** Job name: Job_RouteA_CEL_SOLID_robotfine Model name: RouteA_SolidCEL_Probe
** Generated by: Abaqus/CAE 2025
*Preprint, echo=NO, model=NO, history=NO, contact=NO
**
** PARTS
**
**
** TRUE CEL LOCAL STRAIGHT DOMAIN: 80 x 6 x 6 EC3D8R cells; h=0.15 mm
** REPAIRED TRUE-CEL DOMAIN: actual lumen coverage; h=0.15 mm
**
** TRUE CEL SHORT DOMAIN: 30 x 10 x 10 EC3D8R; ds=0.25 mm; dq=0.15 mm
** TRUE CEL STABILITY DOMAIN: 25 x 20 x 20 EC3D8R; ds=0.24; dq=0.075 mm
** TRUE CEL STABILITY DOMAIN: 25 x 20 x 20 EC3D8R; ds=0.24; dq=0.075 mm
** LONG COARSE CEL DOMAIN: 44 x 20 x 20 EC3D8R; ds=0.272727272727; dq=0.075000000000 mm
*Part, name=FLUID_EULERIAN
*Node
1, -13.232571746416, -4.114654206627, -11.475610969847
2, -12.966313575440, -4.131517486103, -11.419021381733
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*Element, type=EC3D8R
1, 1, 2, 47, 46, 946, 947, 992, 991
2, 2, 3, 48, 47, 947, 948, 993, 992
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*Elset, elset=FLUID_CEL_BODY, generate
1, 17600, 1
*Nset, nset=FLUID_CEL_NODES, generate
1, 19845, 1
*Eulerian Section, elset=FLUID_CEL_BODY
MAT_FLUID_CEL, WATER
*End Part
**
*Part, name=Pipe_WALL_HELPER
*Node
1, -19.2778697489, -2.56472286113, -11.4865091191
2, -19.3034056993, -2.7224333001, -11.4133571423
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*Element, type=R3D4
1, 1, 25, 26, 2
2, 2, 26, 27, 3
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*Elset, elset=PIPE_WALL_HELPER_ALL, generate
1, 2880, 1
*Surface, type=ELEMENT, name=PIPE_WALL_HELPER_SURF
PIPE_WALL_HELPER_ALL, SPOS
*End Part
** Robot-only terminal stop; not included in CEL material contact
*Part, name=Pipe_TERMINAL_STOP
*Node
       1, -17.8120422, -16.0254612, -1.98043847
       2, -18.0087299, -16.4204502, -1.75030053
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*Element, type=R3D4
       1, 1, 2, 3, 4
       2, 4, 3, 5, 6
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*Elset, elset=PIPE_TERMINAL_STOP_ALL, generate
1, 75, 1
*Surface, type=ELEMENT, name=PIPE_TERMINAL_STOP_SURF
PIPE_TERMINAL_STOP_ALL, SPOS
*End Part
** Robot-only HIGH terminal stop; CEL material remains open
*Part, name=Pipe_TERMINAL_STOP_HIGH
*Node
       1, 6.27608633, -5.94825697, -5.65262365
       2, 6.23722649, -5.56458235, -5.31121445
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*Element, type=R3D4
       1, 1, 2, 3, 4
       2, 4, 3, 5, 6
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*Elset, elset=PIPE_TERMINAL_STOP_HIGH_ALL, generate
1, 23, 1
*Surface, type=ELEMENT, name=PIPE_TERMINAL_STOP_HIGH_SURF
PIPE_TERMINAL_STOP_HIGH_ALL, SPOS
*End Part
*Part, name=Pipe_SOLID
*Node
      1,  -16.5284824,  -17.2844334,  -1.96806526
      2,  -18.3441372,  -16.7630806,  -2.62501884
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*Element, type=C3D4
   1,  843,  844,  845,  846
   2,  847,  671,  848,  676
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*Nset, nset=PIPE_CEL_BODY, generate
    1,  1345,     1
*Elset, elset=PIPE_CEL_BODY, generate
    1,  5203,     1
*Elset, elset=PIPE_SOLID_ALL, generate
1, 5203, 1
*Surface, type=ELEMENT, name=PIPE_SOLID_SURF
PIPE_SOLID_ALL, S1
PIPE_SOLID_ALL, S2
PIPE_SOLID_ALL, S3
PIPE_SOLID_ALL, S4
** Section: SEC_PIPE_RIGID
*Solid Section, elset=PIPE_CEL_BODY, material=MAT_PIPE_RIGID
,
*End Part
**
** SCREENING ONLY: exact STEP import; no node scaling
*Part, name=Robot_SOLID
*Node
1, -11.763434150011, -2.985750955408, -10.529796531146
2, -9.501672672955, -3.128998074384, -10.049089591962
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*Element, type=C3D4
1, 706, 707, 708, 709
2, 710, 711, 712, 713
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*Elset, elset=ROBOT_EXTERIOR_S1
30, 47, 68, 171, 237, 299
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*Elset, elset=ROBOT_EXTERIOR_S2
1146, 1523, 1627, 1654, 1800, 1842
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*Elset, elset=ROBOT_EXTERIOR_S3
134, 1142, 1323, 1539, 1625, 1741
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*Elset, elset=ROBOT_EXTERIOR_S4
501, 940, 1143, 1610, 1636, 1655
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*Nset, nset=ROBOT_CEL_BODY, generate
1, 1588, 1
*Elset, elset=ROBOT_CEL_BODY, generate
1, 7302, 1
*Elset, elset=ROBOT_SOLID_ALL, generate
1, 7302, 1
*Surface, type=ELEMENT, name=ROBOT_SOLID_SURF
ROBOT_EXTERIOR_S1, S1
ROBOT_EXTERIOR_S2, S2
ROBOT_EXTERIOR_S3, S3
ROBOT_EXTERIOR_S4, S4
*Solid Section, elset=ROBOT_CEL_BODY, material=MAT_ROBOT_RIGID
,
*Nset, nset=TAIL_REGION
1, 4, 5, 6, 7, 8
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*Nset, nset=HEAD_REGION
3, 74, 75, 76, 77, 629
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*Nset, nset=BODY_REGION
2, 31, 32, 33, 34, 35
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*End Part
**
**
** ASSEMBLY
**
*Assembly, name=Assembly
*Instance, name=Pipe_WALL_HELPER-1, part=Pipe_WALL_HELPER
*End Instance
**
*Instance, name=Pipe_TERMINAL_STOP-1, part=Pipe_TERMINAL_STOP
*End Instance
**
*Instance, name=Pipe_TERMINAL_STOP_HIGH-1, part=Pipe_TERMINAL_STOP_HIGH
*End Instance
**
*Elset, elset=PIPE_TERMINAL_STOP_CEL_ALL, instance=Pipe_TERMINAL_STOP-1, generate
1, 75, 1
*Elset, elset=PIPE_TERMINAL_STOP_HIGH_CEL_ALL, instance=Pipe_TERMINAL_STOP_HIGH-1, generate
1, 23, 1
*Elset, elset=PIPE_WALL_HELPER_CEL_ALL, instance=Pipe_WALL_HELPER-1, generate
1, 2880, 1
**
*Instance, name=Pipe_SOLID-1, part=Pipe_SOLID
*End Instance
**
*Instance, name=Robot_SOLID-1, part=Robot_SOLID
*End Instance
**
*Instance, name=Fluid_EULERIAN-1, part=FLUID_EULERIAN
*End Instance
*Elset, elset=EUL_LOW, instance=Fluid_EULERIAN-1
1, 45, 89, 133, 177, 221
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*Elset, elset=EUL_HIGH, instance=Fluid_EULERIAN-1
44, 88, 132, 176, 220, 264
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*Surface, type=ELEMENT, name=EUL_LOW
EUL_LOW, S6
*Surface, type=ELEMENT, name=EUL_HIGH
EUL_HIGH, S4
*Elset, elset=FLUID_CEL_ALL, instance=Fluid_EULERIAN-1, generate
1, 17600, 1
*Elset, elset=INITFIX_EVF_1P000000, instance=Fluid_EULERIAN-1
2025, 2026, 2027, 2028, 2029, 2030
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*Elset, elset=INITFIX_EVF_0P996094, instance=Fluid_EULERIAN-1
4054, 4063, 6528, 10751, 13734, 13743
*Elset, elset=INITFIX_EVF_0P994141, instance=Fluid_EULERIAN-1
10928
*Elset, elset=INITFIX_EVF_0P992188, instance=Fluid_EULERIAN-1
6349, 6351, 7222, 9862, 10004
*Elset, elset=INITFIX_EVF_0P990234, instance=Fluid_EULERIAN-1
7364
*Elset, elset=INITFIX_EVF_0P986328, instance=Fluid_EULERIAN-1
6660, 10750, 11666
*Elset, elset=INITFIX_EVF_0P984375, instance=Fluid_EULERIAN-1
4055, 4056, 4057, 4058, 4059, 4060
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*Elset, elset=INITFIX_EVF_0P982422, instance=Fluid_EULERIAN-1
5506
*Elset, elset=INITFIX_EVF_0P980469, instance=Fluid_EULERIAN-1
6350, 12590
*Elset, elset=INITFIX_EVF_0P978516, instance=Fluid_EULERIAN-1
7584
*Elset, elset=INITFIX_EVF_0P976562, instance=Fluid_EULERIAN-1
4670, 10224
*Elset, elset=INITFIX_EVF_0P972656, instance=Fluid_EULERIAN-1
3878
*Elset, elset=INITFIX_EVF_0P966797, instance=Fluid_EULERIAN-1
13558
*Elset, elset=INITFIX_EVF_0P958984, instance=Fluid_EULERIAN-1
3887, 7223
*Elset, elset=INITFIX_EVF_0P957031, instance=Fluid_EULERIAN-1
8102, 13567
*Elset, elset=INITFIX_EVF_0P955078, instance=Fluid_EULERIAN-1
9863
*Elset, elset=INITFIX_EVF_0P949219, instance=Fluid_EULERIAN-1
6572, 8982
*Elset, elset=INITFIX_EVF_0P947266, instance=Fluid_EULERIAN-1
12599
*Elset, elset=INITFIX_EVF_0P945312, instance=Fluid_EULERIAN-1
10972
*Elset, elset=INITFIX_EVF_0P941406, instance=Fluid_EULERIAN-1
4010, 4679, 6616, 9124
*Elset, elset=INITFIX_EVF_0P939453, instance=Fluid_EULERIAN-1
8244, 11016
*Elset, elset=INITFIX_EVF_0P937500, instance=Fluid_EULERIAN-1
6827, 6828, 6829, 6830, 6831, 6832
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*Elset, elset=INITFIX_EVF_0P931641, instance=Fluid_EULERIAN-1
4019, 5515, 9864, 11667
*Elset, elset=INITFIX_EVF_0P929688, instance=Fluid_EULERIAN-1
4978, 12898
*Elset, elset=INITFIX_EVF_0P925781, instance=Fluid_EULERIAN-1
5902, 8464, 13699
*Elset, elset=INITFIX_EVF_0P921875, instance=Fluid_EULERIAN-1
5507, 12062
*Elset, elset=INITFIX_EVF_0P917969, instance=Fluid_EULERIAN-1
9344
*Elset, elset=INITFIX_EVF_0P914062, instance=Fluid_EULERIAN-1
12591, 13602
*Elset, elset=INITFIX_EVF_0P912109, instance=Fluid_EULERIAN-1
11668
*Elset, elset=INITFIX_EVF_0P910156, instance=Fluid_EULERIAN-1
3922, 5508
*Elset, elset=INITFIX_EVF_0P908203, instance=Fluid_EULERIAN-1
4987
*Elset, elset=INITFIX_EVF_0P906250, instance=Fluid_EULERIAN-1
2817, 2818, 2819, 2820, 2821, 2822
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*Elset, elset=INITFIX_EVF_0P904297, instance=Fluid_EULERIAN-1
5911, 7225, 11669
*Elset, elset=INITFIX_EVF_0P902344, instance=Fluid_EULERIAN-1
7706
*Elset, elset=INITFIX_EVF_0P900391, instance=Fluid_EULERIAN-1
12071
*Elset, elset=INITFIX_EVF_0P898438, instance=Fluid_EULERIAN-1
9865
*Elset, elset=INITFIX_EVF_0P896484, instance=Fluid_EULERIAN-1
9871
*Elset, elset=INITFIX_EVF_0P894531, instance=Fluid_EULERIAN-1
7408, 12593
*Elset, elset=INITFIX_EVF_0P892578, instance=Fluid_EULERIAN-1
7231
*Elset, elset=INITFIX_EVF_0P890625, instance=Fluid_EULERIAN-1
10048
*Elset, elset=INITFIX_EVF_0P884766, instance=Fluid_EULERIAN-1
5509, 11670, 12594
*Elset, elset=INITFIX_EVF_0P882812, instance=Fluid_EULERIAN-1
3879, 13611
*Elset, elset=INITFIX_EVF_0P878906, instance=Fluid_EULERIAN-1
7540
*Elset, elset=INITFIX_EVF_0P876953, instance=Fluid_EULERIAN-1
4673
*Elset, elset=INITFIX_EVF_0P875000, instance=Fluid_EULERIAN-1
1277, 1278, 1279, 1280, 1281, 1282
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*Elset, elset=INITFIX_EVF_0P873047, instance=Fluid_EULERIAN-1
3931, 10180
*Elset, elset=INITFIX_EVF_0P871094, instance=Fluid_EULERIAN-1
5510, 7226
*Elset, elset=INITFIX_EVF_0P869141, instance=Fluid_EULERIAN-1
10355
*Elset, elset=INITFIX_EVF_0P867188, instance=Fluid_EULERIAN-1
7715, 12596
*Elset, elset=INITFIX_EVF_0P865234, instance=Fluid_EULERIAN-1
3975, 9866, 13655
*Elset, elset=INITFIX_EVF_0P863281, instance=Fluid_EULERIAN-1
11671
*Elset, elset=INITFIX_EVF_0P861328, instance=Fluid_EULERIAN-1
3880
*Elset, elset=INITFIX_EVF_0P859375, instance=Fluid_EULERIAN-1
3881, 3882, 3883, 3884, 3885, 3886, 4675, 4676, 4677, 5511, 13559, 13560, 13561
*Elset, elset=INITFIX_EVF_0P857422, instance=Fluid_EULERIAN-1
12597
*Elset, elset=INITFIX_EVF_0P855469, instance=Fluid_EULERIAN-1
8586
*Elset, elset=INITFIX_EVF_0P853516, instance=Fluid_EULERIAN-1
10786
*Elset, elset=INITFIX_EVF_0P851562, instance=Fluid_EULERIAN-1
6386, 9466
*Elset, elset=INITFIX_EVF_0P847656, instance=Fluid_EULERIAN-1
5512
*Elset, elset=INITFIX_EVF_0P843750, instance=Fluid_EULERIAN-1
11672, 12598, 13562, 13563, 13564, 13565, 13566
*Elset, elset=INITFIX_EVF_0P839844, instance=Fluid_EULERIAN-1
7227
*Elset, elset=INITFIX_EVF_0P835938, instance=Fluid_EULERIAN-1
4714, 7452, 8288, 9168, 11673
*Elset, elset=INITFIX_EVF_0P833984, instance=Fluid_EULERIAN-1
10092
*Elset, elset=INITFIX_EVF_0P832031, instance=Fluid_EULERIAN-1
12634
*Elset, elset=INITFIX_EVF_0P830078, instance=Fluid_EULERIAN-1
9867
*Elset, elset=INITFIX_EVF_0P826172, instance=Fluid_EULERIAN-1
4678
*Elset, elset=INITFIX_EVF_0P822266, instance=Fluid_EULERIAN-1
7496, 10136
*Elset, elset=INITFIX_EVF_0P814453, instance=Fluid_EULERIAN-1
8420, 11674
*Elset, elset=INITFIX_EVF_0P810547, instance=Fluid_EULERIAN-1
5513
*Elset, elset=INITFIX_EVF_0P808594, instance=Fluid_EULERIAN-1
9300
*Elset, elset=INITFIX_EVF_0P806641, instance=Fluid_EULERIAN-1
8111
*Elset, elset=INITFIX_EVF_0P796875, instance=Fluid_EULERIAN-1
8991
*Elset, elset=INITFIX_EVF_0P792969, instance=Fluid_EULERIAN-1
7228
*Elset, elset=INITFIX_EVF_0P791016, instance=Fluid_EULERIAN-1
5514
*Elset, elset=INITFIX_EVF_0P789062, instance=Fluid_EULERIAN-1
5550, 9475, 9868, 11710
*Elset, elset=INITFIX_EVF_0P787109, instance=Fluid_EULERIAN-1
8983
*Elset, elset=INITFIX_EVF_0P785156, instance=Fluid_EULERIAN-1
8595
*Elset, elset=INITFIX_EVF_0P781250, instance=Fluid_EULERIAN-1
4934, 12854
*Elset, elset=INITFIX_EVF_0P773438, instance=Fluid_EULERIAN-1
8103
*Elset, elset=INITFIX_EVF_0P769531, instance=Fluid_EULERIAN-1
11182
*Elset, elset=INITFIX_EVF_0P765625, instance=Fluid_EULERIAN-1
1233, 1234, 1235, 1236, 1237, 1238
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*Elset, elset=INITFIX_EVF_0P761719, instance=Fluid_EULERIAN-1
7266
*Elset, elset=INITFIX_EVF_0P759766, instance=Fluid_EULERIAN-1
8984
*Elset, elset=INITFIX_EVF_0P757812, instance=Fluid_EULERIAN-1
7229, 9906
*Elset, elset=INITFIX_EVF_0P753906, instance=Fluid_EULERIAN-1
5858, 12018
*Elset, elset=INITFIX_EVF_0P750000, instance=Fluid_EULERIAN-1
4758, 4802, 4846, 4890, 5594, 5638
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*Elset, elset=INITFIX_EVF_0P740234, instance=Fluid_EULERIAN-1
8105
*Elset, elset=INITFIX_EVF_0P728516, instance=Fluid_EULERIAN-1
7230
*Elset, elset=INITFIX_EVF_0P718750, instance=Fluid_EULERIAN-1
4979, 4980, 4981, 4982, 4983, 4984, 4985, 4986, 12899, 12900, 12901, 12902, 12903, 12904, 12905, 12906
*Elset, elset=INITFIX_EVF_0P714844, instance=Fluid_EULERIAN-1
9870
*Elset, elset=INITFIX_EVF_0P705078, instance=Fluid_EULERIAN-1
8985
*Elset, elset=INITFIX_EVF_0P703125, instance=Fluid_EULERIAN-1
5903, 5904, 5905, 5906, 5907, 5908, 5909, 5910
*Elset, elset=INITFIX_EVF_0P687500, instance=Fluid_EULERIAN-1
12063, 12064, 12065, 12066, 12067, 12068, 12069, 12070
*Elset, elset=INITFIX_EVF_0P677734, instance=Fluid_EULERIAN-1
4723
*Elset, elset=INITFIX_EVF_0P671875, instance=Fluid_EULERIAN-1
1981, 1982, 1983, 1984, 1985, 1986
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*Elset, elset=INITFIX_EVF_0P664062, instance=Fluid_EULERIAN-1
8986
*Elset, elset=INITFIX_EVF_0P660156, instance=Fluid_EULERIAN-1
8106
*Elset, elset=INITFIX_EVF_0P656250, instance=Fluid_EULERIAN-1
13603, 13604, 13605, 13606, 13607, 13608, 13609, 13610
*Elset, elset=INITFIX_EVF_0P640625, instance=Fluid_EULERIAN-1
3923, 3924, 3925
*Elset, elset=INITFIX_EVF_0P638672, instance=Fluid_EULERIAN-1
8987
*Elset, elset=INITFIX_EVF_0P634766, instance=Fluid_EULERIAN-1
3926
*Elset, elset=INITFIX_EVF_0P625000, instance=Fluid_EULERIAN-1
3927, 3928, 3929, 3930, 3967, 3968
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*Elset, elset=INITFIX_EVF_0P621094, instance=Fluid_EULERIAN-1
8108
*Elset, elset=INITFIX_EVF_0P617188, instance=Fluid_EULERIAN-1
6395, 10795
*Elset, elset=INITFIX_EVF_0P615234, instance=Fluid_EULERIAN-1
12863
*Elset, elset=INITFIX_EVF_0P609375, instance=Fluid_EULERIAN-1
4943, 7707, 7708, 7709, 7710, 7711, 7712, 7713, 7714
*Elset, elset=INITFIX_EVF_0P593750, instance=Fluid_EULERIAN-1
8988
*Elset, elset=INITFIX_EVF_0P582031, instance=Fluid_EULERIAN-1
11191
*Elset, elset=INITFIX_EVF_0P570312, instance=Fluid_EULERIAN-1
6791
*Elset, elset=INITFIX_EVF_0P550781, instance=Fluid_EULERIAN-1
8109
*Elset, elset=INITFIX_EVF_0P544922, instance=Fluid_EULERIAN-1
8989
*Elset, elset=INITFIX_EVF_0P541016, instance=Fluid_EULERIAN-1
5559, 11719
*Elset, elset=INITFIX_EVF_0P531250, instance=Fluid_EULERIAN-1
1189, 1190, 1191, 1192, 1193, 1194
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*Elset, elset=INITFIX_EVF_0P521484, instance=Fluid_EULERIAN-1
8990
*Elset, elset=INITFIX_EVF_0P501953, instance=Fluid_EULERIAN-1
8110, 12027
*Elset, elset=INITFIX_EVF_0P492188, instance=Fluid_EULERIAN-1
5867
*Elset, elset=INITFIX_EVF_0P476562, instance=Fluid_EULERIAN-1
12687
*Elset, elset=INITFIX_EVF_0P470703, instance=Fluid_EULERIAN-1
4767
*Elset, elset=INITFIX_EVF_0P447266, instance=Fluid_EULERIAN-1
4899
*Elset, elset=INITFIX_EVF_0P439453, instance=Fluid_EULERIAN-1
12819
*Elset, elset=INITFIX_EVF_0P421875, instance=Fluid_EULERIAN-1
8587, 8588, 8589, 8590, 8591, 8592, 8593, 8594
*Elset, elset=INITFIX_EVF_0P412109, instance=Fluid_EULERIAN-1
9915
*Elset, elset=INITFIX_EVF_0P410156, instance=Fluid_EULERIAN-1
7275
*Elset, elset=INITFIX_EVF_0P406250, instance=Fluid_EULERIAN-1
9467, 9468, 9469, 9470, 9471, 9472, 9473, 9474
*Elset, elset=INITFIX_EVF_0P400391, instance=Fluid_EULERIAN-1
10311
*Elset, elset=INITFIX_EVF_0P396484, instance=Fluid_EULERIAN-1
7671
*Elset, elset=INITFIX_EVF_0P392578, instance=Fluid_EULERIAN-1
12731
*Elset, elset=INITFIX_EVF_0P390625, instance=Fluid_EULERIAN-1
4811
*Elset, elset=INITFIX_EVF_0P382812, instance=Fluid_EULERIAN-1
6387, 10787, 12775
*Elset, elset=INITFIX_EVF_0P378906, instance=Fluid_EULERIAN-1
4855
*Elset, elset=INITFIX_EVF_0P359375, instance=Fluid_EULERIAN-1
10788
*Elset, elset=INITFIX_EVF_0P351562, instance=Fluid_EULERIAN-1
6388
*Elset, elset=INITFIX_EVF_0P343750, instance=Fluid_EULERIAN-1
8155, 9035
*Elset, elset=INITFIX_EVF_0P335938, instance=Fluid_EULERIAN-1
8551, 9431
*Elset, elset=INITFIX_EVF_0P324219, instance=Fluid_EULERIAN-1
6389
*Elset, elset=INITFIX_EVF_0P322266, instance=Fluid_EULERIAN-1
12635
*Elset, elset=INITFIX_EVF_0P320312, instance=Fluid_EULERIAN-1
5603
*Elset, elset=INITFIX_EVF_0P318359, instance=Fluid_EULERIAN-1
11763
*Elset, elset=INITFIX_EVF_0P314453, instance=Fluid_EULERIAN-1
4715
*Elset, elset=INITFIX_EVF_0P312500, instance=Fluid_EULERIAN-1
10789
*Elset, elset=INITFIX_EVF_0P310547, instance=Fluid_EULERIAN-1
12636
*Elset, elset=INITFIX_EVF_0P304688, instance=Fluid_EULERIAN-1
10839
*Elset, elset=INITFIX_EVF_0P300781, instance=Fluid_EULERIAN-1
4716
*Elset, elset=INITFIX_EVF_0P298828, instance=Fluid_EULERIAN-1
6439
*Elset, elset=INITFIX_EVF_0P296875, instance=Fluid_EULERIAN-1
11983
*Elset, elset=INITFIX_EVF_0P292969, instance=Fluid_EULERIAN-1
5823
*Elset, elset=INITFIX_EVF_0P287109, instance=Fluid_EULERIAN-1
12637
*Elset, elset=INITFIX_EVF_0P283203, instance=Fluid_EULERIAN-1
4717, 6747
*Elset, elset=INITFIX_EVF_0P281250, instance=Fluid_EULERIAN-1
12638
*Elset, elset=INITFIX_EVF_0P277344, instance=Fluid_EULERIAN-1
11147
*Elset, elset=INITFIX_EVF_0P275391, instance=Fluid_EULERIAN-1
6390, 10790
*Elset, elset=INITFIX_EVF_0P273438, instance=Fluid_EULERIAN-1
4718
*Elset, elset=INITFIX_EVF_0P265625, instance=Fluid_EULERIAN-1
4719
*Elset, elset=INITFIX_EVF_0P259766, instance=Fluid_EULERIAN-1
4720
*Elset, elset=INITFIX_EVF_0P257812, instance=Fluid_EULERIAN-1
12639
*Elset, elset=INITFIX_EVF_0P250000, instance=Fluid_EULERIAN-1
4721, 10791, 12640
*Elset, elset=INITFIX_EVF_0P246094, instance=Fluid_EULERIAN-1
12641
*Elset, elset=INITFIX_EVF_0P240234, instance=Fluid_EULERIAN-1
4722, 6391
*Elset, elset=INITFIX_EVF_0P234375, instance=Fluid_EULERIAN-1
12642
*Elset, elset=INITFIX_EVF_0P212891, instance=Fluid_EULERIAN-1
6392
*Elset, elset=INITFIX_EVF_0P208984, instance=Fluid_EULERIAN-1
10792
*Elset, elset=INITFIX_EVF_0P203125, instance=Fluid_EULERIAN-1
5647
*Elset, elset=INITFIX_EVF_0P199219, instance=Fluid_EULERIAN-1
11807
*Elset, elset=INITFIX_EVF_0P187500, instance=Fluid_EULERIAN-1
10793, 11939
*Elset, elset=INITFIX_EVF_0P185547, instance=Fluid_EULERIAN-1
6393
*Elset, elset=INITFIX_EVF_0P181641, instance=Fluid_EULERIAN-1
5779
*Elset, elset=INITFIX_EVF_0P173828, instance=Fluid_EULERIAN-1
7319
*Elset, elset=INITFIX_EVF_0P171875, instance=Fluid_EULERIAN-1
1145, 1146, 1147, 1148, 1149, 1150
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*Elset, elset=INITFIX_EVF_0P158203, instance=Fluid_EULERIAN-1
6394, 7627
*Elset, elset=INITFIX_EVF_0P156250, instance=Fluid_EULERIAN-1
2773, 2774, 2775, 2776, 2777, 2778
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*Elset, elset=INITFIX_EVF_0P154297, instance=Fluid_EULERIAN-1
5552
*Elset, elset=INITFIX_EVF_0P152344, instance=Fluid_EULERIAN-1
11851
*Elset, elset=INITFIX_EVF_0P150391, instance=Fluid_EULERIAN-1
5691, 11711
*Elset, elset=INITFIX_EVF_0P142578, instance=Fluid_EULERIAN-1
10794
*Elset, elset=INITFIX_EVF_0P134766, instance=Fluid_EULERIAN-1
5735, 11895
*Elset, elset=INITFIX_EVF_0P128906, instance=Fluid_EULERIAN-1
10883
*Elset, elset=INITFIX_EVF_0P125000, instance=Fluid_EULERIAN-1
4935, 4936, 4937, 4938, 4939, 4940
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*Elset, elset=INITFIX_EVF_0P115234, instance=Fluid_EULERIAN-1
9079, 11712
*Elset, elset=INITFIX_EVF_0P113281, instance=Fluid_EULERIAN-1
8199
*Elset, elset=INITFIX_EVF_0P109375, instance=Fluid_EULERIAN-1
6703
*Elset, elset=INITFIX_EVF_0P105469, instance=Fluid_EULERIAN-1
11103
*Elset, elset=INITFIX_EVF_0P097656, instance=Fluid_EULERIAN-1
5553
*Elset, elset=INITFIX_EVF_0P095703, instance=Fluid_EULERIAN-1
11713
*Elset, elset=INITFIX_EVF_0P093750, instance=Fluid_EULERIAN-1
1937, 1938, 1939, 1940, 1941, 1942
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*Elset, elset=INITFIX_EVF_0P089844, instance=Fluid_EULERIAN-1
8507
*Elset, elset=INITFIX_EVF_0P085938, instance=Fluid_EULERIAN-1
9387
*Elset, elset=INITFIX_EVF_0P078125, instance=Fluid_EULERIAN-1
11183, 11184, 11185, 11186, 11187, 11188, 11189, 11190
*Elset, elset=INITFIX_EVF_0P074219, instance=Fluid_EULERIAN-1
5557
*Elset, elset=INITFIX_EVF_0P070312, instance=Fluid_EULERIAN-1
11716
*Elset, elset=INITFIX_EVF_0P062500, instance=Fluid_EULERIAN-1
6783, 6784, 6785, 6786, 6787, 6788, 6789, 6790
*Elset, elset=INITFIX_EVF_0P046875, instance=Fluid_EULERIAN-1
5558, 11717, 11718
*Elset, elset=INITFIX_EVF_0P031250, instance=Fluid_EULERIAN-1
7267, 10927
*Elset, elset=INITFIX_EVF_0P027344, instance=Fluid_EULERIAN-1
6527
*Elset, elset=INITFIX_EVF_0P025391, instance=Fluid_EULERIAN-1
9907
*Elset, elset=INITFIX_EVF_0P019531, instance=Fluid_EULERIAN-1
7363
*Elset, elset=INITFIX_EVF_0P017578, instance=Fluid_EULERIAN-1
6659, 10003
*Elset, elset=INITFIX_EVF_0P015625, instance=Fluid_EULERIAN-1
5859, 5860, 5861, 5862, 5863, 5864
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*Elset, elset=INITFIX_EVF_0P011719, instance=Fluid_EULERIAN-1
11059
*Elset, elset=INITFIX_EVF_0P007812, instance=Fluid_EULERIAN-1
7583, 10223
*Elset, elset=INITFIX_EVF_0P001953, instance=Fluid_EULERIAN-1
9909*
*Elset, elset=PIPE_SOLID_CEL_ALL, instance=Pipe_SOLID-1, generate
1, 5203, 1
*Elset, elset=ROBOT_SOLID_CEL_ALL, instance=Robot_SOLID-1, generate
1, 7302, 1
**
*Node
      1,  -5.80302477,  -9.99273777,  -5.95533371
*Node
      2, -10.591104434431, -3.464137020896, -10.215768586540
*Nset, nset=RP_PIPE
 1,
*Nset, nset=RP_ROBOT
 2,
*Elset, elset=PIPE_RIGID_ALL
PIPE_SOLID_CEL_ALL,
PIPE_WALL_HELPER_CEL_ALL,
PIPE_TERMINAL_STOP_CEL_ALL,
PIPE_TERMINAL_STOP_HIGH_CEL_ALL,
*Rigid Body, ref node=RP_PIPE, elset=PIPE_RIGID_ALL
** Constraint: RB_PIPE
** Constraint: RB_ROBOT
*Rigid Body, ref node=RP_ROBOT, elset=ROBOT_SOLID_CEL_ALL
*Surface, type=EULERIAN MATERIAL, name=FLUID_CEL_SURF
Fluid_EULERIAN-1_WATER
*End Assembly
** FAST_SURROGATE_FLUID: no CEL mesh, EOS, advection, or fluid contact.
** STRICT ZERO-OVERLAP CONSERVATIVE WATER INITIALIZATION
*Initial Conditions, type=VOLUME FRACTION
INITFIX_EVF_1P000000, Fluid_EULERIAN-1_WATER, 1.000000
INITFIX_EVF_0P996094, Fluid_EULERIAN-1_WATER, 0.996094
INITFIX_EVF_0P994141, Fluid_EULERIAN-1_WATER, 0.994141
INITFIX_EVF_0P992188, Fluid_EULERIAN-1_WATER, 0.992188
INITFIX_EVF_0P990234, Fluid_EULERIAN-1_WATER, 0.990234
INITFIX_EVF_0P986328, Fluid_EULERIAN-1_WATER, 0.986328
INITFIX_EVF_0P984375, Fluid_EULERIAN-1_WATER, 0.984375
INITFIX_EVF_0P982422, Fluid_EULERIAN-1_WATER, 0.982422
INITFIX_EVF_0P980469, Fluid_EULERIAN-1_WATER, 0.980469
INITFIX_EVF_0P978516, Fluid_EULERIAN-1_WATER, 0.978516
INITFIX_EVF_0P976562, Fluid_EULERIAN-1_WATER, 0.976562
INITFIX_EVF_0P972656, Fluid_EULERIAN-1_WATER, 0.972656
INITFIX_EVF_0P966797, Fluid_EULERIAN-1_WATER, 0.966797
INITFIX_EVF_0P958984, Fluid_EULERIAN-1_WATER, 0.958984
INITFIX_EVF_0P957031, Fluid_EULERIAN-1_WATER, 0.957031
INITFIX_EVF_0P955078, Fluid_EULERIAN-1_WATER, 0.955078
INITFIX_EVF_0P949219, Fluid_EULERIAN-1_WATER, 0.949219
INITFIX_EVF_0P947266, Fluid_EULERIAN-1_WATER, 0.947266
INITFIX_EVF_0P945312, Fluid_EULERIAN-1_WATER, 0.945312
INITFIX_EVF_0P941406, Fluid_EULERIAN-1_WATER, 0.941406
INITFIX_EVF_0P939453, Fluid_EULERIAN-1_WATER, 0.939453
INITFIX_EVF_0P937500, Fluid_EULERIAN-1_WATER, 0.937500
INITFIX_EVF_0P931641, Fluid_EULERIAN-1_WATER, 0.931641
INITFIX_EVF_0P929688, Fluid_EULERIAN-1_WATER, 0.929688
INITFIX_EVF_0P925781, Fluid_EULERIAN-1_WATER, 0.925781
INITFIX_EVF_0P921875, Fluid_EULERIAN-1_WATER, 0.921875
INITFIX_EVF_0P917969, Fluid_EULERIAN-1_WATER, 0.917969
INITFIX_EVF_0P914062, Fluid_EULERIAN-1_WATER, 0.914062
INITFIX_EVF_0P912109, Fluid_EULERIAN-1_WATER, 0.912109
INITFIX_EVF_0P910156, Fluid_EULERIAN-1_WATER, 0.910156
INITFIX_EVF_0P908203, Fluid_EULERIAN-1_WATER, 0.908203
INITFIX_EVF_0P906250, Fluid_EULERIAN-1_WATER, 0.906250
INITFIX_EVF_0P904297, Fluid_EULERIAN-1_WATER, 0.904297
INITFIX_EVF_0P902344, Fluid_EULERIAN-1_WATER, 0.902344
INITFIX_EVF_0P900391, Fluid_EULERIAN-1_WATER, 0.900391
INITFIX_EVF_0P898438, Fluid_EULERIAN-1_WATER, 0.898438
INITFIX_EVF_0P896484, Fluid_EULERIAN-1_WATER, 0.896484
INITFIX_EVF_0P894531, Fluid_EULERIAN-1_WATER, 0.894531
INITFIX_EVF_0P892578, Fluid_EULERIAN-1_WATER, 0.892578
INITFIX_EVF_0P890625, Fluid_EULERIAN-1_WATER, 0.890625
INITFIX_EVF_0P884766, Fluid_EULERIAN-1_WATER, 0.884766
INITFIX_EVF_0P882812, Fluid_EULERIAN-1_WATER, 0.882812
INITFIX_EVF_0P878906, Fluid_EULERIAN-1_WATER, 0.878906
INITFIX_EVF_0P876953, Fluid_EULERIAN-1_WATER, 0.876953
INITFIX_EVF_0P875000, Fluid_EULERIAN-1_WATER, 0.875000
INITFIX_EVF_0P873047, Fluid_EULERIAN-1_WATER, 0.873047
INITFIX_EVF_0P871094, Fluid_EULERIAN-1_WATER, 0.871094
INITFIX_EVF_0P869141, Fluid_EULERIAN-1_WATER, 0.869141
INITFIX_EVF_0P867188, Fluid_EULERIAN-1_WATER, 0.867188
INITFIX_EVF_0P865234, Fluid_EULERIAN-1_WATER, 0.865234
INITFIX_EVF_0P863281, Fluid_EULERIAN-1_WATER, 0.863281
INITFIX_EVF_0P861328, Fluid_EULERIAN-1_WATER, 0.861328
INITFIX_EVF_0P859375, Fluid_EULERIAN-1_WATER, 0.859375
INITFIX_EVF_0P857422, Fluid_EULERIAN-1_WATER, 0.857422
INITFIX_EVF_0P855469, Fluid_EULERIAN-1_WATER, 0.855469
INITFIX_EVF_0P853516, Fluid_EULERIAN-1_WATER, 0.853516
INITFIX_EVF_0P851562, Fluid_EULERIAN-1_WATER, 0.851562
INITFIX_EVF_0P847656, Fluid_EULERIAN-1_WATER, 0.847656
INITFIX_EVF_0P843750, Fluid_EULERIAN-1_WATER, 0.843750
INITFIX_EVF_0P839844, Fluid_EULERIAN-1_WATER, 0.839844
INITFIX_EVF_0P835938, Fluid_EULERIAN-1_WATER, 0.835938
INITFIX_EVF_0P833984, Fluid_EULERIAN-1_WATER, 0.833984
INITFIX_EVF_0P832031, Fluid_EULERIAN-1_WATER, 0.832031
INITFIX_EVF_0P830078, Fluid_EULERIAN-1_WATER, 0.830078
INITFIX_EVF_0P826172, Fluid_EULERIAN-1_WATER, 0.826172
INITFIX_EVF_0P822266, Fluid_EULERIAN-1_WATER, 0.822266
INITFIX_EVF_0P814453, Fluid_EULERIAN-1_WATER, 0.814453
INITFIX_EVF_0P810547, Fluid_EULERIAN-1_WATER, 0.810547
INITFIX_EVF_0P808594, Fluid_EULERIAN-1_WATER, 0.808594
INITFIX_EVF_0P806641, Fluid_EULERIAN-1_WATER, 0.806641
INITFIX_EVF_0P796875, Fluid_EULERIAN-1_WATER, 0.796875
INITFIX_EVF_0P792969, Fluid_EULERIAN-1_WATER, 0.792969
INITFIX_EVF_0P791016, Fluid_EULERIAN-1_WATER, 0.791016
INITFIX_EVF_0P789062, Fluid_EULERIAN-1_WATER, 0.789062
INITFIX_EVF_0P787109, Fluid_EULERIAN-1_WATER, 0.787109
INITFIX_EVF_0P785156, Fluid_EULERIAN-1_WATER, 0.785156
INITFIX_EVF_0P781250, Fluid_EULERIAN-1_WATER, 0.781250
INITFIX_EVF_0P773438, Fluid_EULERIAN-1_WATER, 0.773438
INITFIX_EVF_0P769531, Fluid_EULERIAN-1_WATER, 0.769531
INITFIX_EVF_0P765625, Fluid_EULERIAN-1_WATER, 0.765625
INITFIX_EVF_0P761719, Fluid_EULERIAN-1_WATER, 0.761719
INITFIX_EVF_0P759766, Fluid_EULERIAN-1_WATER, 0.759766
INITFIX_EVF_0P757812, Fluid_EULERIAN-1_WATER, 0.757812
INITFIX_EVF_0P753906, Fluid_EULERIAN-1_WATER, 0.753906
INITFIX_EVF_0P750000, Fluid_EULERIAN-1_WATER, 0.750000
INITFIX_EVF_0P740234, Fluid_EULERIAN-1_WATER, 0.740234
INITFIX_EVF_0P728516, Fluid_EULERIAN-1_WATER, 0.728516
INITFIX_EVF_0P718750, Fluid_EULERIAN-1_WATER, 0.718750
INITFIX_EVF_0P714844, Fluid_EULERIAN-1_WATER, 0.714844
INITFIX_EVF_0P705078, Fluid_EULERIAN-1_WATER, 0.705078
INITFIX_EVF_0P703125, Fluid_EULERIAN-1_WATER, 0.703125
INITFIX_EVF_0P687500, Fluid_EULERIAN-1_WATER, 0.687500
INITFIX_EVF_0P677734, Fluid_EULERIAN-1_WATER, 0.677734
INITFIX_EVF_0P671875, Fluid_EULERIAN-1_WATER, 0.671875
INITFIX_EVF_0P664062, Fluid_EULERIAN-1_WATER, 0.664062
INITFIX_EVF_0P660156, Fluid_EULERIAN-1_WATER, 0.660156
INITFIX_EVF_0P656250, Fluid_EULERIAN-1_WATER, 0.656250
INITFIX_EVF_0P640625, Fluid_EULERIAN-1_WATER, 0.640625
INITFIX_EVF_0P638672, Fluid_EULERIAN-1_WATER, 0.638672
INITFIX_EVF_0P634766, Fluid_EULERIAN-1_WATER, 0.634766
INITFIX_EVF_0P625000, Fluid_EULERIAN-1_WATER, 0.625000
INITFIX_EVF_0P621094, Fluid_EULERIAN-1_WATER, 0.621094
INITFIX_EVF_0P617188, Fluid_EULERIAN-1_WATER, 0.617188
INITFIX_EVF_0P615234, Fluid_EULERIAN-1_WATER, 0.615234
INITFIX_EVF_0P609375, Fluid_EULERIAN-1_WATER, 0.609375
INITFIX_EVF_0P593750, Fluid_EULERIAN-1_WATER, 0.593750
INITFIX_EVF_0P582031, Fluid_EULERIAN-1_WATER, 0.582031
INITFIX_EVF_0P570312, Fluid_EULERIAN-1_WATER, 0.570312
INITFIX_EVF_0P550781, Fluid_EULERIAN-1_WATER, 0.550781
INITFIX_EVF_0P544922, Fluid_EULERIAN-1_WATER, 0.544922
INITFIX_EVF_0P541016, Fluid_EULERIAN-1_WATER, 0.541016
INITFIX_EVF_0P531250, Fluid_EULERIAN-1_WATER, 0.531250
INITFIX_EVF_0P521484, Fluid_EULERIAN-1_WATER, 0.521484
INITFIX_EVF_0P501953, Fluid_EULERIAN-1_WATER, 0.501953
INITFIX_EVF_0P492188, Fluid_EULERIAN-1_WATER, 0.492188
INITFIX_EVF_0P476562, Fluid_EULERIAN-1_WATER, 0.476562
INITFIX_EVF_0P470703, Fluid_EULERIAN-1_WATER, 0.470703
INITFIX_EVF_0P447266, Fluid_EULERIAN-1_WATER, 0.447266
INITFIX_EVF_0P439453, Fluid_EULERIAN-1_WATER, 0.439453
INITFIX_EVF_0P421875, Fluid_EULERIAN-1_WATER, 0.421875
INITFIX_EVF_0P412109, Fluid_EULERIAN-1_WATER, 0.412109
INITFIX_EVF_0P410156, Fluid_EULERIAN-1_WATER, 0.410156
INITFIX_EVF_0P406250, Fluid_EULERIAN-1_WATER, 0.406250
INITFIX_EVF_0P400391, Fluid_EULERIAN-1_WATER, 0.400391
INITFIX_EVF_0P396484, Fluid_EULERIAN-1_WATER, 0.396484
INITFIX_EVF_0P392578, Fluid_EULERIAN-1_WATER, 0.392578
INITFIX_EVF_0P390625, Fluid_EULERIAN-1_WATER, 0.390625
INITFIX_EVF_0P382812, Fluid_EULERIAN-1_WATER, 0.382812
INITFIX_EVF_0P378906, Fluid_EULERIAN-1_WATER, 0.378906
INITFIX_EVF_0P359375, Fluid_EULERIAN-1_WATER, 0.359375
INITFIX_EVF_0P351562, Fluid_EULERIAN-1_WATER, 0.351562
INITFIX_EVF_0P343750, Fluid_EULERIAN-1_WATER, 0.343750
INITFIX_EVF_0P335938, Fluid_EULERIAN-1_WATER, 0.335938
INITFIX_EVF_0P324219, Fluid_EULERIAN-1_WATER, 0.324219
INITFIX_EVF_0P322266, Fluid_EULERIAN-1_WATER, 0.322266
INITFIX_EVF_0P320312, Fluid_EULERIAN-1_WATER, 0.320312
INITFIX_EVF_0P318359, Fluid_EULERIAN-1_WATER, 0.318359
INITFIX_EVF_0P314453, Fluid_EULERIAN-1_WATER, 0.314453
INITFIX_EVF_0P312500, Fluid_EULERIAN-1_WATER, 0.312500
INITFIX_EVF_0P310547, Fluid_EULERIAN-1_WATER, 0.310547
INITFIX_EVF_0P304688, Fluid_EULERIAN-1_WATER, 0.304688
INITFIX_EVF_0P300781, Fluid_EULERIAN-1_WATER, 0.300781
INITFIX_EVF_0P298828, Fluid_EULERIAN-1_WATER, 0.298828
INITFIX_EVF_0P296875, Fluid_EULERIAN-1_WATER, 0.296875
INITFIX_EVF_0P292969, Fluid_EULERIAN-1_WATER, 0.292969
INITFIX_EVF_0P287109, Fluid_EULERIAN-1_WATER, 0.287109
INITFIX_EVF_0P283203, Fluid_EULERIAN-1_WATER, 0.283203
INITFIX_EVF_0P281250, Fluid_EULERIAN-1_WATER, 0.281250
INITFIX_EVF_0P277344, Fluid_EULERIAN-1_WATER, 0.277344
INITFIX_EVF_0P275391, Fluid_EULERIAN-1_WATER, 0.275391
INITFIX_EVF_0P273438, Fluid_EULERIAN-1_WATER, 0.273438
INITFIX_EVF_0P265625, Fluid_EULERIAN-1_WATER, 0.265625
INITFIX_EVF_0P259766, Fluid_EULERIAN-1_WATER, 0.259766
INITFIX_EVF_0P257812, Fluid_EULERIAN-1_WATER, 0.257812
INITFIX_EVF_0P250000, Fluid_EULERIAN-1_WATER, 0.250000
INITFIX_EVF_0P246094, Fluid_EULERIAN-1_WATER, 0.246094
INITFIX_EVF_0P240234, Fluid_EULERIAN-1_WATER, 0.240234
INITFIX_EVF_0P234375, Fluid_EULERIAN-1_WATER, 0.234375
INITFIX_EVF_0P212891, Fluid_EULERIAN-1_WATER, 0.212891
INITFIX_EVF_0P208984, Fluid_EULERIAN-1_WATER, 0.208984
INITFIX_EVF_0P203125, Fluid_EULERIAN-1_WATER, 0.203125
INITFIX_EVF_0P199219, Fluid_EULERIAN-1_WATER, 0.199219
INITFIX_EVF_0P187500, Fluid_EULERIAN-1_WATER, 0.187500
INITFIX_EVF_0P185547, Fluid_EULERIAN-1_WATER, 0.185547
INITFIX_EVF_0P181641, Fluid_EULERIAN-1_WATER, 0.181641
INITFIX_EVF_0P173828, Fluid_EULERIAN-1_WATER, 0.173828
INITFIX_EVF_0P171875, Fluid_EULERIAN-1_WATER, 0.171875
INITFIX_EVF_0P158203, Fluid_EULERIAN-1_WATER, 0.158203
INITFIX_EVF_0P156250, Fluid_EULERIAN-1_WATER, 0.156250
INITFIX_EVF_0P154297, Fluid_EULERIAN-1_WATER, 0.154297
INITFIX_EVF_0P152344, Fluid_EULERIAN-1_WATER, 0.152344
INITFIX_EVF_0P150391, Fluid_EULERIAN-1_WATER, 0.150391
INITFIX_EVF_0P142578, Fluid_EULERIAN-1_WATER, 0.142578
INITFIX_EVF_0P134766, Fluid_EULERIAN-1_WATER, 0.134766
INITFIX_EVF_0P128906, Fluid_EULERIAN-1_WATER, 0.128906
INITFIX_EVF_0P125000, Fluid_EULERIAN-1_WATER, 0.125000
INITFIX_EVF_0P115234, Fluid_EULERIAN-1_WATER, 0.115234
INITFIX_EVF_0P113281, Fluid_EULERIAN-1_WATER, 0.113281
INITFIX_EVF_0P109375, Fluid_EULERIAN-1_WATER, 0.109375
INITFIX_EVF_0P105469, Fluid_EULERIAN-1_WATER, 0.105469
INITFIX_EVF_0P097656, Fluid_EULERIAN-1_WATER, 0.097656
INITFIX_EVF_0P095703, Fluid_EULERIAN-1_WATER, 0.095703
INITFIX_EVF_0P093750, Fluid_EULERIAN-1_WATER, 0.093750
INITFIX_EVF_0P089844, Fluid_EULERIAN-1_WATER, 0.089844
INITFIX_EVF_0P085938, Fluid_EULERIAN-1_WATER, 0.085938
INITFIX_EVF_0P078125, Fluid_EULERIAN-1_WATER, 0.078125
INITFIX_EVF_0P074219, Fluid_EULERIAN-1_WATER, 0.074219
INITFIX_EVF_0P070312, Fluid_EULERIAN-1_WATER, 0.070312
INITFIX_EVF_0P062500, Fluid_EULERIAN-1_WATER, 0.062500
INITFIX_EVF_0P046875, Fluid_EULERIAN-1_WATER, 0.046875
INITFIX_EVF_0P031250, Fluid_EULERIAN-1_WATER, 0.031250
INITFIX_EVF_0P027344, Fluid_EULERIAN-1_WATER, 0.027344
INITFIX_EVF_0P025391, Fluid_EULERIAN-1_WATER, 0.025391
INITFIX_EVF_0P019531, Fluid_EULERIAN-1_WATER, 0.019531
INITFIX_EVF_0P017578, Fluid_EULERIAN-1_WATER, 0.017578
INITFIX_EVF_0P015625, Fluid_EULERIAN-1_WATER, 0.015625
INITFIX_EVF_0P011719, Fluid_EULERIAN-1_WATER, 0.011719
INITFIX_EVF_0P007812, Fluid_EULERIAN-1_WATER, 0.007812
INITFIX_EVF_0P001953, Fluid_EULERIAN-1_WATER, 0.001953
*Initial Conditions, type=VELOCITY
Fluid_EULERIAN-1.FLUID_CEL_NODES, 1, 0.0
Fluid_EULERIAN-1.FLUID_CEL_NODES, 2, 0.0
Fluid_EULERIAN-1.FLUID_CEL_NODES, 3, 0.0
** MATERIALS
**
*Material, name=MAT_FLUID_CEL
*Density
1.0007e-09,
*Eos, type=USUP
100000, 0., 0.
*Viscosity
7.1e-10,
*Material, name=MAT_PIPE_RIGID
*Density
 1e-09,
*Elastic
 1e+06, 0.3
*Material, name=MAT_ROBOT_RIGID
*Density
7.80906654321e-09,
*Elastic
 1e+06, 0.3
**
** INTERACTION PROPERTIES
**
*Surface Interaction, name=PROP_CEL_HARD
*Friction
0.03,
*Surface Behavior, pressure-overclosure=SCALE FACTOR
50.0, , 10.0, 0.10
*Contact Damping, definition=CRITICAL DAMPING FRACTION, tangent fraction=0.0
1.0
*Surface Interaction, name=PROP_CEL_FLUID_HARD
*Friction
0.03,
*Surface Behavior, pressure-overclosure=HARD
*Surface Interaction, name=PROP_CEL_FLUID_RF_FRIC0
*Friction
*Surface Behavior, pressure-overclosure=HARD
** RF-only isolation: robot-fluid assignment only

**
** BOUNDARY CONDITIONS
**
** Name: BC_PIPE_FIXED Type: Symmetry/Antisymmetry/Encastre
*Boundary
RP_PIPE, ENCASTRE
** ----------------------------------------------------------------
**
** STEP: Step_Drive
**
*Contact
*Contact Inclusions
ROBOT_SOLID-1.ROBOT_SOLID_SURF, Pipe_WALL_HELPER-1.PIPE_WALL_HELPER_SURF
ROBOT_SOLID-1.ROBOT_SOLID_SURF, FLUID_CEL_SURF
Pipe_WALL_HELPER-1.PIPE_WALL_HELPER_SURF, FLUID_CEL_SURF
*Contact Property Assignment
ROBOT_SOLID-1.ROBOT_SOLID_SURF, Pipe_WALL_HELPER-1.PIPE_WALL_HELPER_SURF, PROP_CEL_HARD
ROBOT_SOLID-1.ROBOT_SOLID_SURF, FLUID_CEL_SURF, PROP_CEL_FLUID_RF_FRIC0
Pipe_WALL_HELPER-1.PIPE_WALL_HELPER_SURF, FLUID_CEL_SURF, PROP_CEL_FLUID_HARD
** FAST_SURROGATE, PRECOMPUTED_TABLE, fixed refined geometry.
*Step, name=Step_Drive, nlgeom=YES
*Dynamic, Explicit, SCALE FACTOR=0.4
, 0.020000000000
*Eulerian Boundary, OUTFLOW=ZERO PRESSURE
EUL_LOW
EUL_HIGH
*Bulk Viscosity
0.06, 1.2
**
** BOUNDARY CONDITIONS
**
** PRECOMPUTED_TABLE magnetic loads plus FAST_SURROGATE_FLUID.
** No Python, TCP, Magpylib, CEL, prescribed motion, or velocity clamp during dynamics.
*Amplitude, name=SOCKET_FX, definition=USER
*Amplitude, name=SOCKET_FY, definition=USER
*Amplitude, name=SOCKET_FZ, definition=USER
*Amplitude, name=SOCKET_MX, definition=USER
*Amplitude, name=SOCKET_MY, definition=USER
*Amplitude, name=SOCKET_MZ, definition=USER
*Cload, amplitude=SOCKET_FX
RP_ROBOT, 1, 1.
*Cload, amplitude=SOCKET_FY
RP_ROBOT, 2, 1.
*Cload, amplitude=SOCKET_FZ
RP_ROBOT, 3, 1.
*Cload, amplitude=SOCKET_MX
RP_ROBOT, 4, 1.
*Cload, amplitude=SOCKET_MY
RP_ROBOT, 5, 1.
*Cload, amplitude=SOCKET_MZ
RP_ROBOT, 6, 1.
** FAST_SURROGATE_FLUID = OFF; TRUE CEL supplies all fluid loads.
** FAST_SURROGATE_FLUID uses V_rel=V_robot-10*c_hat mm/s.
**
** OUTPUT REQUESTS
**
**
** FIELD OUTPUT: F-Output-1
**
** IMPACT ENERGY DIAGNOSTIC: preserve all existing physics; save visualization/contact fields every 25 us; RP and contact-resultant history remains every increment.
*Output, field, time interval=0.000025, time marks=NO
*Node Output, nset=Robot_SOLID-1.ROBOT_CEL_BODY
U, V
*Node Output, nset=RP_ROBOT
U, UR, V, VR
*Contact Output, surface=ROBOT_SOLID-1.ROBOT_SOLID_SURF
CDISP
*Node Output, nset=Fluid_EULERIAN-1.FLUID_CEL_NODES
V
*Element Output, elset=FLUID_CEL_ALL
EVF, PRESS
*Output, history, frequency=1
*Node Output, nset=RP_ROBOT
COORD, U, UR, V, VR, A, AR, CF, RF, RM
*Contact Output, surface=ROBOT_SOLID-1.ROBOT_SOLID_SURF
CFN, CFS, CFT
*Contact Output, surface=ROBOT_SOLID-1.ROBOT_SOLID_SURF, SECOND SURFACE=Pipe_WALL_HELPER-1.PIPE_WALL_HELPER_SURF
CFN, CFS, CFT
*Contact Output, surface=Pipe_WALL_HELPER-1.PIPE_WALL_HELPER_SURF
CFN, CFS, CFT
*Output, history, time interval=5.0e-6
*Energy Output, variable=ALL
*Output, history, frequency=1, sensor, name=RP_U1
*Node Output, nset=RP_ROBOT
U1
*Output, history, frequency=1, sensor, name=RP_U2
*Node Output, nset=RP_ROBOT
U2
*Output, history, frequency=1, sensor, name=RP_U3
*Node Output, nset=RP_ROBOT
U3
*Output, history, frequency=1, sensor, name=RP_UR1
*Node Output, nset=RP_ROBOT
UR1
*Output, history, frequency=1, sensor, name=RP_UR2
*Node Output, nset=RP_ROBOT
UR2
*Output, history, frequency=1, sensor, name=RP_UR3
*Node Output, nset=RP_ROBOT
UR3
*Output, history, frequency=1, sensor, name=RP_V1
*Node Output, nset=RP_ROBOT
V1
*Output, history, frequency=1, sensor, name=RP_V2
*Node Output, nset=RP_ROBOT
V2
*Output, history, frequency=1, sensor, name=RP_V3
*Node Output, nset=RP_ROBOT
V3
*Output, history, frequency=1, sensor, name=RP_VR1
*Node Output, nset=RP_ROBOT
VR1
*Output, history, frequency=1, sensor, name=RP_VR2
*Node Output, nset=RP_ROBOT
VR2
*Output, history, frequency=1, sensor, name=RP_VR3
*Node Output, nset=RP_ROBOT
VR3
*End Step
