** R014 exterior mesh analytic-field probe; 10 mg; D055; gradient 3 mT; Bias40; forward
** RESTORED ROBOT: _robot_true_R014_source.inp mesh; exact 6 mg; 2.01 mm wall helper offset=0.005 mm
** HIGH-WOBBLE 6 ms PROBE: only damping 0.055 -> 0.020; all other physics unchanged
** BOUNDED MEDIUM PROBE: 6 ms; no geometry/physics change; output 2 us
** COPEN PRECHECK: physics unchanged; robot exterior-only surface output added
** ROBOT CONTACT SANITIZED: TRUE EXTERIOR FACES ONLY
** ROBOT PART TRANSPLANTED FROM UNROUNDED BASE; no stacked fillet
** donor=_robot_true_R014_source.inp
** High-end robot-only stop added; CEL remains open; band=0.8 mm, faces=23
** CAPSULE/FILLET VARIANT; rf=0.1 mm; source=CEL_CurrentCenterline_Cone15_Z110_PolarityPlus_Mu003_Damp055_AfterBendReverse_015.inp
** MATRIX VARIANT: mu003
** Z=110 mm single-variable probe; 5 Hz fixed; m_robot=1.168e-3 A*m^2; adaptive-lead=0.
** POLARITY-PLUS CLOSED-LOOP 0.03 s: +robot_axis_global end assumed N; adaptive-lead=0.
** FULL 3D LIVE-MAGNETIC FORCE/TORQUE CLOSED-LOOP: the force is projected onto the local DXF tangent; torque remains live from Magpylib; endpoint caps are retained in the wall helper; duration=0.03 s
** FULL 3D LIVE-MAGNETIC FORCE/TORQUE CLOSED-LOOP: the force is projected onto the local DXF tangent; torque remains live from Magpylib; endpoint caps are retained in the wall helper; duration=0.006 s
** FULL 3D LIVE-MAGNETIC FORCE/TORQUE CLOSED-LOOP: the force is projected onto the local DXF tangent; torque remains live from Magpylib; endpoint caps are retained in the wall helper; duration=0.03 s
** Terminal robot-only outlet stop added at low-s end; CEL remains open; cap_band=0.8 mm, faces=75
** FULL 3D LIVE-MAGNETIC FORCE/TORQUE CLOSED-LOOP: the force is projected onto the local DXF tangent; torque remains live from Magpylib; endpoint caps are retained in the wall helper; duration=0.03 s
** FORWARD-ONLY DIAGNOSTIC: live Magpylib force projected onto the local DXF pipe tangent; magnetic torque is disabled; 0.010 s probe
** WALL/CEL FACTORIAL DIAGNOSTIC; only contact inclusions changed
** CEL boundary-wall probe: Pipe_SOLID retained as fixed mass but excluded from contact; helper R3D4 wall offset=0.2 mm, end caps removed=98
*Heading
** WALL/CEL FACTORIAL: WobbleCal_COMFixed_F30_Cone30_B10; Wall=OFF; CEL=ON; 1.8 ms; phase=248 deg; gradient=3.000 mT=0.003000 T; spin=30 Hz
** COM-FIXED CALIBRATION: F40; cone30; B=10 mT; Wall-OFF; CEL-ON; translations fixed, rotations free
** Robot refined contact mesh, centerline translation + tangent-following orientation
** Job name: Job_RouteA_CEL_SOLID_robotfine Model name: RouteA_SolidCEL_Probe
** Generated by: Abaqus/CAE 2025
*Preprint, echo=NO, model=NO, history=NO, contact=NO
**
** PARTS
**
*Part, name=FLUID_EULERIAN
*Node
      1,  -16.7237701,  -16.9749355,  -1.60377359
      2,   -17.105442,  -16.6798229,  -1.42346621
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*Element, type=EC3D8R
   1,   36,   31,   43,   50,    6,    1,   13,   20
   2,   50,   43,   57,   49,   20,   13,   27,   19
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*Elset, elset=FLUID_CEL_BODY, generate
    1,  1564,     1
*Eulerian Section, elset=FLUID_CEL_BODY
MAT_FLUID_CEL, WATER
*End Part
**
** Boundary-only rigid wall helper generated from FLUID_EULERIAN boundary
** Boundary-only rigid wall helper generated from FLUID_EULERIAN boundary
*Part, name=Pipe_WALL_HELPER
*Node
       1, -16.5312897005, -17.2868904576, -1.9669035138
       2, -16.970186333, -17.1510059578, -2.10575531598
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*Element, type=R3D4
       1, 1, 2, 3, 4
       2, 5, 1, 4, 6
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*Elset, elset=PIPE_WALL_HELPER_ALL, generate
1, 764, 1
*Surface, type=ELEMENT, name=PIPE_WALL_HELPER_SURF
PIPE_WALL_HELPER_ALL, SPOS
*End Part
** Robot-only terminal stop; not included in CEL material contact
*Part, name=Pipe_TERMINAL_STOP
*Node
       1, -17.8120422, -16.0254612, -1.98043847
       2, -18.0087299, -16.4204502, -1.75030053
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*Element, type=R3D4
       1, 1, 2, 3, 4
       2, 4, 3, 5, 6
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*Elset, elset=PIPE_TERMINAL_STOP_ALL, generate
1, 75, 1
*Surface, type=ELEMENT, name=PIPE_TERMINAL_STOP_SURF
PIPE_TERMINAL_STOP_ALL, SPOS
*End Part
** Robot-only HIGH terminal stop; CEL material remains open
*Part, name=Pipe_TERMINAL_STOP_HIGH
*Node
       1, 6.27608633, -5.94825697, -5.65262365
       2, 6.23722649, -5.56458235, -5.31121445
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*Element, type=R3D4
       1, 1, 2, 3, 4
       2, 4, 3, 5, 6
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*Elset, elset=PIPE_TERMINAL_STOP_HIGH_ALL, generate
1, 23, 1
*Surface, type=ELEMENT, name=PIPE_TERMINAL_STOP_HIGH_SURF
PIPE_TERMINAL_STOP_HIGH_ALL, SPOS
*End Part
*Part, name=Pipe_SOLID
*Node
      1,  -16.5284824,  -17.2844334,  -1.96806526
      2,  -18.3441372,  -16.7630806,  -2.62501884
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*Element, type=C3D4
   1,  843,  844,  845,  846
   2,  847,  671,  848,  676
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*Nset, nset=PIPE_CEL_BODY, generate
    1,  1345,     1
*Elset, elset=PIPE_CEL_BODY, generate
    1,  5203,     1
*Elset, elset=PIPE_SOLID_ALL, generate
1, 5203, 1
*Surface, type=ELEMENT, name=PIPE_SOLID_SURF
PIPE_SOLID_ALL, S1
PIPE_SOLID_ALL, S2
PIPE_SOLID_ALL, S3
PIPE_SOLID_ALL, S4
** Section: SEC_PIPE_RIGID
*Solid Section, elset=PIPE_CEL_BODY, material=MAT_PIPE_RIGID
,
*End Part
**
** ROBOT TRANSVERSE SHRINK: PCA minor axes scaled to 0.90; long axis unchanged
*Part, name=Robot_SOLID
*Node
1, 3.43472225275, -4.86226208389, -6.86025986431
2, 3.95675337699, -4.88513515563, -7.20912625246
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*Element, type=C3D4
   1, 218, 160, 219, 161
   2, 220, 221, 222, 218
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** TRUE EXTERIOR C3D4 FACE SETS; internal tetra faces excluded
*Elset, elset=ROBOT_EXTERIOR_S1
62, 72, 477, 855, 870, 970
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*Elset, elset=ROBOT_EXTERIOR_S2
35, 466, 488, 829, 834, 851
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*Elset, elset=ROBOT_EXTERIOR_S3
48, 63, 75, 76, 93, 105
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*Elset, elset=ROBOT_EXTERIOR_S4
159, 207, 233, 257, 565, 597
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*Nset, nset=ROBOT_CEL_BODY, generate
   1,  363,    1
*Elset, elset=ROBOT_CEL_BODY, generate
    1,  1431,     1
*Elset, elset=ROBOT_SOLID_ALL, generate
1, 1431, 1
*Surface, type=ELEMENT, name=ROBOT_SOLID_SURF
ROBOT_EXTERIOR_S1, S1
ROBOT_EXTERIOR_S2, S2
ROBOT_EXTERIOR_S3, S3
ROBOT_EXTERIOR_S4, S4
** Section: SEC_ROBOT_RIGID
*Solid Section, elset=ROBOT_CEL_BODY, material=MAT_ROBOT_RIGID
,
*End Part
**
**
** ASSEMBLY
**
*Assembly, name=Assembly
*Instance, name=Pipe_WALL_HELPER-1, part=Pipe_WALL_HELPER
*End Instance
**
*Instance, name=Pipe_TERMINAL_STOP-1, part=Pipe_TERMINAL_STOP
*End Instance
**
*Instance, name=Pipe_TERMINAL_STOP_HIGH-1, part=Pipe_TERMINAL_STOP_HIGH
*End Instance
**
*Elset, elset=PIPE_TERMINAL_STOP_CEL_ALL, instance=Pipe_TERMINAL_STOP-1, generate
1, 75, 1
*Elset, elset=PIPE_TERMINAL_STOP_HIGH_CEL_ALL, instance=Pipe_TERMINAL_STOP_HIGH-1, generate
1, 23, 1
*Elset, elset=PIPE_WALL_HELPER_CEL_ALL, instance=Pipe_WALL_HELPER-1, generate
1, 764, 1
**
*Instance, name=Pipe_SOLID-1, part=Pipe_SOLID
*End Instance
**
*Instance, name=Robot_SOLID-1, part=Robot_SOLID
-12.4046543000, 1.3357653000, -2.9992361000
*End Instance
**
*Instance, name=Fluid_EULERIAN-1, part=FLUID_EULERIAN
*End Instance
*Elset, elset=FLUID_CEL_ALL, instance=Fluid_EULERIAN-1, generate
1, 1564, 1
*Elset, elset=FLUID_CEL_INIT_ALL, instance=Fluid_EULERIAN-1
1, 3, 4, 6, 8, 9
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*Elset, elset=PIPE_SOLID_CEL_ALL, instance=Pipe_SOLID-1, generate
1, 5203, 1
*Elset, elset=ROBOT_SOLID_CEL_ALL, instance=Robot_SOLID-1, generate
1, 1431, 1
**
*Node
      1,  -5.80302477,  -9.99273777,  -5.95533371
*Node
      2, -7.468174204284, -3.676918015967, -9.550745259298
*Nset, nset=RP_PIPE
 1,
*Nset, nset=RP_ROBOT
 2,
*Elset, elset=PIPE_RIGID_ALL
PIPE_SOLID_CEL_ALL,
PIPE_WALL_HELPER_CEL_ALL,
PIPE_TERMINAL_STOP_CEL_ALL,
PIPE_TERMINAL_STOP_HIGH_CEL_ALL,
*Rigid Body, ref node=RP_PIPE, elset=PIPE_RIGID_ALL
** Constraint: RB_PIPE
** Constraint: RB_ROBOT
*Rigid Body, ref node=RP_ROBOT, elset=ROBOT_SOLID_CEL_ALL
*Surface, type=EULERIAN MATERIAL, name=FLUID_CEL_SURF
Fluid_EULERIAN-1_WATER
*End Assembly
** CEL fill uses 1564 verified Eulerian elements; unassigned volume is VOID.
*Initial Conditions, type=VOLUME FRACTION
FLUID_CEL_INIT_ALL, Fluid_EULERIAN-1_WATER, 1.0
**
** MATERIALS
**
*Material, name=MAT_FLUID_CEL
*Density
 1.0007e-09,
*Eos, type=USUP
 1480000, 0., 0.
*Viscosity
 7.1e-10,
*Material, name=MAT_PIPE_RIGID
*Density
 1e-09,
*Elastic
 1e+06, 0.3
*Material, name=MAT_ROBOT_RIGID
*Density
7.80906654321e-09,
*Elastic
 1e+06, 0.3
**
** INTERACTION PROPERTIES
**
*Surface Interaction, name=PROP_CEL_HARD
*Friction
0.03,
*Surface Behavior, pressure-overclosure=HARD
*Contact Damping, definition=CRITICAL DAMPING FRACTION
0.055
**
** BOUNDARY CONDITIONS
**
** Name: BC_PIPE_FIXED Type: Symmetry/Antisymmetry/Encastre
*Boundary
RP_PIPE, ENCASTRE
RP_ROBOT, 1, 3
** ----------------------------------------------------------------
**
** STEP: Step_Drive
**
*Contact
*Contact Inclusions
ROBOT_SOLID-1.ROBOT_SOLID_SURF, FLUID_CEL_SURF
Pipe_WALL_HELPER-1.PIPE_WALL_HELPER_SURF, FLUID_CEL_SURF
*Contact Property Assignment
ROBOT_SOLID-1.ROBOT_SOLID_SURF, FLUID_CEL_SURF, PROP_CEL_HARD
Pipe_WALL_HELPER-1.PIPE_WALL_HELPER_SURF, FLUID_CEL_SURF, PROP_CEL_HARD
** COM-FIXED CALIBRATION PARAMETERS: phase=248.0 deg; cone=30 deg; Bias40; gradient=3.000 mT=0.003000 T; server-side analytic field
** SOCKET BASELINE JOB: Job_RouteA_CEL_Socket_ConnectorFixed_Capsule_0p003
** Local centerline frame at COM RP (metadata only); COM translations constrained in calibration
** COM-fixed RP_ROBOT = (-7.468174204284, -3.676918015967, -9.550745259298) mm; volume-weighted mesh COM
** tangent-X = (-0.928048296, 0.179421111, -0.326396119)
** transported-Y = (0.140416425, 0.988230515, -0.0606933022)
** binormal-Z = (0.312362773, -0.102386426, -0.944429202)
** CSF rho=1.0007e-09 tonne/mm^3; mu=7.1e-10 N*s/mm^2; c0=1480000 mm/s
*Step, name=Step_Drive, nlgeom=YES
*Dynamic, Explicit
, 0.100
*Bulk Viscosity
0.06, 1.2
**
** BOUNDARY CONDITIONS
**
** SOCKET MAGNETIC LOAD INTERFACE -- RP_ROBOT translations fixed at volume COM; UR1-UR3 free.
** Six VUAMP amplitudes remain updated every Explicit increment by vuforc_socket_bridge.f.
** DOF 1..3: Fx,Fy,Fz [N]; DOF 4..6: Mx,My,Mz [N*mm].
** Abaqus uses *CLOAD for both concentrated forces and moments;
** CFORCE/CMOMENT are output quantities, not input keywords.
*Amplitude, name=SOCKET_FX, definition=USER
*Amplitude, name=SOCKET_FY, definition=USER
*Amplitude, name=SOCKET_FZ, definition=USER
*Amplitude, name=SOCKET_MX, definition=USER
*Amplitude, name=SOCKET_MY, definition=USER
*Amplitude, name=SOCKET_MZ, definition=USER
*Cload, amplitude=SOCKET_FX
RP_ROBOT, 1, 1.
*Cload, amplitude=SOCKET_FY
RP_ROBOT, 2, 1.
*Cload, amplitude=SOCKET_FZ
RP_ROBOT, 3, 1.
*Cload, amplitude=SOCKET_MX
RP_ROBOT, 4, 1.
*Cload, amplitude=SOCKET_MY
RP_ROBOT, 5, 1.
*Cload, amplitude=SOCKET_MZ
RP_ROBOT, 6, 1.
**
** OUTPUT REQUESTS
**
*Restart, write, number interval=1, time marks=NO
**
** FIELD OUTPUT: F-Output-1
**
** IMPACT ENERGY DIAGNOSTIC: preserve all existing physics; save contact and energy fields every 1 us.
*Output, field, time interval=1.0e-4, variable=PRESELECT
*Contact Output, general contact
CSTRESS, CFORCE
*Contact Output, surface=ROBOT_SOLID-1.ROBOT_SOLID_SURF
CDISP
**
** HISTORY OUTPUT: H-Output-1
**
*Output, history, time interval=1.0e-4
*Energy Output, variable=ALL
*Node Output, nset=RP_ROBOT
COORD, U, UR, V, VR, A, AR, RF, RM, CF

*Output, history, frequency=1, sensor, name=RP_U1
*Node Output, nset=RP_ROBOT
U1
*Output, history, frequency=1, sensor, name=RP_U2
*Node Output, nset=RP_ROBOT
U2
*Output, history, frequency=1, sensor, name=RP_U3
*Node Output, nset=RP_ROBOT
U3
*Output, history, frequency=1, sensor, name=RP_UR1
*Node Output, nset=RP_ROBOT
UR1
*Output, history, frequency=1, sensor, name=RP_UR2
*Node Output, nset=RP_ROBOT
UR2
*Output, history, frequency=1, sensor, name=RP_UR3
*Node Output, nset=RP_ROBOT
UR3
*End Step
